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/batch
! ANSYS input file written by Workbench version 2021 R1
! File used for geometry attach: C:\Users\ASUS\Documents\ANSYS\ANSYS2021\Sec03-4\Gear_files\dp0\Geom-1\DM\Geom-1.agdb
/title,Gear--Static Structural (C5)
/com,--- Data in consistent BIN units. See Solving Units in the help system for more information.
/units,BIN
/prep7
! Turn off shape checking because checks already performed inside WB mesher.
! See help system for more information.
SHPP,OFF,,NOWARN
etcon,set             ! allow ANSYS to choose best KEYOP's for 180x elements, resets any applicable keyopt to MAPDL defaults
/com,*********** Nodes for the whole assembly ***********
nblock,3,,17290
(1i9,3e20.9e3)
        1     1.250000000E+00     1.530808499E-16     0.000000000E+00
        2     1.227566719E+00     2.357540054E-01     0.000000000E+00
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-1
/com,*********** Nodes for all Remote Points ***********
nblock,3
(1i9,3e20.9e3)
    15720    -6.486151918E-17     5.010000000E+00     0.000000000E+00
-1
/com,*********** Elements for Body 1 "Lower Gear" ***********
et,1,183
keyo,1,3,3
eblock,19,solid,,2480
(19i9)
        1        1        1        1        0        0        0        0        8        0        1      348      353     2122     2122     3426     3436     2122     3427
        1        1        1        1        0        0        0        0        8        0        2      373      372     2249     2249     3475     3476     2249     3477
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-1
/com,*********** Elements for Body 2 "Upper Gear" ***********
et,2,183
keyo,2,3,3
eblock,19,solid,,2439
(19i9)
        2        2        2        2        0        0        0        0        8        0     2481     8030     8029    10163    10163    10818    10819    10163    10820
        2        2        2        2        0        0        0        0        8        0     2482     8363     8362     9959     9959    11489    11490     9959    11491
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-1
/com,*********** Send User Defined Coordinate System(s) ***********
csys,0
toffst,459.67,  ! Temperature offset from absolute zero
/com,*********** Set Reference Temperature ***********
tref,71.6
/com,*********** Send Materials ***********
Temperature = 'TEMP' ! Temperature
MP,DENS,1,0.000734544492879577,	! slinch in^-3
MP,ALPX,1,6.66666666666667e-06,	! F^-1
MP,C,1,373722.969668162,	! in^2 s^-2 F^-1
MP,KXX,1,7.55607836445752,	! slinch in s^-3 F^-1
MP,RSVX,1,8.52348993288591,	! ohm cmil in^-1
MP,EX,1,29007547.5428236,	! slinch s^-2 in^-1
MP,NUXY,1,0.3,
MP,MURX,1,10000,

Temperature = 'TEMP' ! Temperature
MP,DENS,2,0.000734544492879577,	! slinch in^-3
MP,ALPX,2,6.66666666666667e-06,	! F^-1
MP,C,2,373722.969668162,	! in^2 s^-2 F^-1
MP,KXX,2,7.55607836445752,	! slinch in s^-3 F^-1
MP,RSVX,2,8.52348993288591,	! ohm cmil in^-1
MP,EX,2,29007547.5428236,	! slinch s^-2 in^-1
MP,NUXY,2,0.3,
MP,MURX,2,10000,

/com,*********** Send Sheet Properties ***********
r,1,1.

r,2,1.

!************************* Model Summary ********************
!Lower Gear,	Structural Steel,	matid,	1
!Upper Gear,	Structural Steel,	matid,	2
!************************* End Model Summary ********************
/com,*********** Create Contact "Frictionless - Lower Gear To Upper Gear" ***********
*set,tid,4
*set,cid,3
r,tid
r,cid
et,tid,169
et,cid,172
eblock,10,,,44
(15i9)
     4921        4        4        4        0      254      302     3237
     4922        4        4        4        0      302      301     3330
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-1
eblock,10,,,44
(15i9)
     4965        3        3        3        0      254      302     3237
     4966        3        3        3        0      302      301     3330
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-1
eblock,10,,,44
(15i9)
     5009        3        4        3        0     8402     8401    11567
     5010        3        4        3        0     8401     8400    11565
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-1
eblock,10,,,44
(15i9)
     5053        4        3        4        0     8402     8401    11567
     5054        4        3        4        0     8401     8400    11565
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-1
keyo,cid,8,2               ! auto create asymmetric contact (from Program Controlled setting)
keyo,cid,10,0              ! adjust contact stiffness each NR iteration (from Program Controlled setting)
keyo,cid,12,0              ! standard contact
keyo,cid,18,1              ! small sliding turned on by application
keyo,cid,2,0               ! augmented Lagrange
keyo,cid,4,0               ! on Gauss point (from Program Controlled setting)
keyo,cid,9,1               ! ignore initial gaps/penetration
keyo,cid,5,1               ! auto CNOF adjustment to close geometric gap only
keyo,cid,7,0               ! No Prediction
rmod,tid,3,1.       ! FKN
rmod,tid,5,0.       ! ICONT
rmod,tid,6,1.       ! PINB
rmod,tid,10,0.      ! CNOF
rmod,tid,12,0.      ! FKT
rmod,tid,36,27      ! WB DSID
rmod,cid,3,1.       ! FKN
rmod,cid,5,0.       ! ICONT
rmod,cid,6,1.       ! PINB
rmod,cid,10,0.      ! CNOF
rmod,cid,12,0.      ! FKT
rmod,cid,36,27      ! WB DSID
nsel,all
esel,all
/com,*********** Fixed Supports ***********
CMBLOCK,_FIXEDSU,NODE,       68
(8i10)
         1         2         3         4         5         6         7         8
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cmsel,s,_FIXEDSU
d,all,all
nsel,all
/com,********* Frictionless Supports X *********
CMBLOCK,_FRICSUX,NODE,       33
(8i10)
      7925      7926      7927      7928      7929      7938      7939      7940
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cmsel,s,_FRICSUX
d,all,ux,0
nsel,all
/com,********* Frictionless Supports Y *********
CMBLOCK,_FRICSUY,NODE,       35
(8i10)
      7930      7931      7932      7933      7934      7935      7936      7937
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cmsel,s,_FRICSUY
d,all,uy,0
nsel,all
/com,*********** Node Rotations ***********
nmod,7926,,,,10.8712800170293,0.,0.
nmod,7927,,,,21.4333498161347,0.,0.
nmod,7928,,,,32.0183727331863,0.,0.
nmod,7929,,,,43.0212905476453,0.,0.
nmod,7930,,,,-35.9933905304809,0.,0.
nmod,7931,,,,-25.2585532734937,0.,0.
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nmod,10672,,,,-15.7641664707738,0.,0.
/com,*********** Create Remote Point "Internal Remote Point" ***********
! -------- Remote Point Used by "Moment" --------
*set,tid,6
*set,cid,5
et,cid,172
et,tid,169
keyo,tid,2,1               ! Don't fix the pilot node
keyo,tid,4,000111
keyo,cid,12,5              ! Bonded Contact
keyo,cid,4,1               ! Deformable RBE3 style load
keyo,cid,2,2               ! MPC style contact
eblock,10,,,34
(15i9)
     5097        5        5        5        0     7926     7925    10603
     5098        5        5        5        0     7927     7926    10606
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-1
*set,_npilot,15720
_npilot47=_npilot
type,tid
mat ,cid
real,cid
tshape,pilo
en,5131,_npilot
tshape
/com,*********** Construct Moment Using Remote Attachment ***********
fini
/com,****************************************************************************
/com,*************************    SOLUTION       ********************************
/com,****************************************************************************
/solu
antype,0                   ! static analysis
_thickRatio=  0     ! Ratio of thick parts in the model
eqsl,sparse,,,,,1
cntr,print,1               ! print out contact info and also make no initial contact an error
dmpoption,emat,no             ! Don't combine emat file for DANSYS
dmpoption,esav,no             ! Don't combine esav file for DANSYS
nldiag,cont,iter           ! print out contact info each equilibrium iteration
rescontrol,define,last,last,,dele	   ! Program Controlled
/com,****************************************************
/com,******************* SOLVE FOR LS 1 OF 1 ****************
nsel,s,node,,15720
f,all,mz,-14999.9999974574
nsel,all
autots,on                  ! Workbench Program Controlled automatic time stepping
nsub,1,10,1                ! due to presence of general nonlinear
time,1.
outres,erase
outres,all,none
outres,nsol,all,
outres,rsol,all
outres,eangl,all
outres,etmp,all
outres,veng,all
outres,strs,all,
outres,epel,all,
outres,eppl,all,
outres,cont,all,
! *********** WB SOLVE COMMAND ***********
! check interactive state
*get,ANSINTER_,active,,int
*if,ANSINTER_,ne,0,then
/eof
*endif
solve
/com *************** Write FE CONNECTORS *********
CEWRITE,file,ce,,INTE
/com,****************************************************
/com,*************** FINISHED SOLVE FOR LS 1 *************
/post1
fini
