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/batch
! ANSYS input file written by Workbench version 2021 R1
! File used for geometry attach: C:\Users\ASUS\Documents\ANSYS\ANSYS2021\Sec12-2\Fork_files\dp0\SYS\DM\SYS.agdb
/title,Fork--Transient (B5)
/com,--- Data in consistent NMM units. See Solving Units in the help system for more information.
/units,MPA
/prep7
! Turn off shape checking because checks already performed inside WB mesher.
! See help system for more information.
SHPP,OFF,,NOWARN
etcon,set             ! allow ANSYS to choose best KEYOP's for 180x elements, resets any applicable keyopt to MAPDL defaults
/com,*********** Nodes for the whole assembly ***********
nblock,3,,7716
(1i9,3e20.9e3)
        1    -1.100000000E+03     0.000000000E+00     4.000000000E+02
        2     1.100000000E+03     0.000000000E+00     4.000000000E+02
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-1
/com,*********** Elements for Body 1 "Fork" ***********
et,1,186
keyo,1,2,1          ! set full integration on SOLID186
eblock,19,solid,,624
(19i9)
        1        1        1        1        0        0        0        0       20        0        1     3281     3287     3288     3282     1915     1919     1921     1917
     7013     7014     7015     7005     4657     4658     4659     4652     7008     3515     3951     7009
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-1
/com,*********** Elements for Body 2 "Glass" ***********
et,2,181
keyo,2,3,2
eblock,19,solid,,1554
(19i9)
        2        2        2        2        0        0        0        0        4        0      625     1557        5     1558        3
        2        2        2        2        0        0        0        0        4        0      626     1556       46        5     1557
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-1
/com,*********** Send User Defined Coordinate System(s) ***********
csys,0
toffst,273.15,  ! Temperature offset from absolute zero
/com,*********** Set Reference Temperature ***********
tref,22.
/com,*********** Send Materials ***********
Temperature = 'TEMP' ! Temperature
MP,DENS,1,7.85e-09,	! tonne mm^-3
MP,ALPX,1,1.2e-05,	! C^-1
MP,C,1,434000000,	! mm^2 s^-2 C^-1
MP,KXX,1,60.5,	! tonne mm s^-3 C^-1
MP,RSVX,1,0.00017,	! ohm mm
MP,EX,1,200000,	! tonne s^-2 mm^-1
MP,NUXY,1,0.3,
MP,MURX,1,10000,

MP,DENS,2,2.37e-09,	! tonne mm^-3
MP,EX,2,70000,	! tonne s^-2 mm^-1
MP,NUXY,2,0.22,

/com,*********** Send Sheet Properties ***********
sectype,2,shell
secdata,1.
secoff,mid

!************************* Model Summary ********************
!Fork,	Structural Steel,	matid,	1
!Glass,	Glass,	matid,	2
!************************* End Model Summary ********************
/com,*********** Create Contact "Contact Region" ***********
*set,tid,4
*set,cid,3
r,tid
r,cid
et,tid,170
et,cid,174
eblock,10,,,468
(15i9)
     3831        4        4        4        0     3065     3063     3071     3073     6631     6640     6645     3470
     3832        4        4        4        0     3063     3061     3069     3071     6627     6634     6641     6640
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-1
eblock,10,,,468
(15i9)
     4299        3        3        3        0     3065     3063     3071     3073     6631     6640     6645     3470
     4300        3        3        3        0     3063     3061     3069     3071     6627     6634     6641     6640
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-1
eblock,10,,,536
(15i9)
     4767        3        4        3        0      214      213      172      173
     4768        3        4        3        0      255      254      213      214
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-1
eblock,10,,,536
(15i9)
     5303        4        3        4        0      214      213      172      173
     5304        4        3        4        0      255      254      213      214
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-1
keyo,cid,8,2               ! auto create asymmetric contact (from Program Controlled setting)
keyo,cid,10,0              ! adjust contact stiffness each NR iteration (from Program Controlled setting)
keyo,cid,12,5              ! bonded always
keyo,cid,18,1              ! small sliding turned on by application
keyo,cid,2,0               ! augmented Lagrange (from Program Controlled setting)
keyo,cid,4,0               ! on Gauss point (from Program Controlled setting)
keyo,cid,9,1               ! ignore initial gaps/penetration
keyo,cid,7,0               ! No Prediction
rmod,tid,3,10.      ! FKN
rmod,tid,5,0.       ! ICONT
rmod,tid,6,-9.10068704922461  ! PINB
rmod,tid,10,0.      ! CNOF
rmod,tid,12,0.      ! FKT
rmod,tid,36,28      ! WB DSID
rmod,cid,3,10.      ! FKN
rmod,cid,5,0.       ! ICONT
rmod,cid,6,-9.10068704922461  ! PINB
rmod,cid,10,0.      ! CNOF
rmod,cid,12,0.      ! FKT
rmod,cid,36,28      ! WB DSID
nsel,all
esel,all
/com,*********** Fixed Supports ***********
CMBLOCK,_FIXEDSU,NODE,      153
(8i10)
      1835      1836      1837      1838      1839      1840      1841      1842
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cmsel,s,_FIXEDSU
d,all,all
nsel,all
fini
/com,****************************************************************************
/com,*************************    SOLUTION       ********************************
/com,****************************************************************************
/solu
antype,4                   ! transient analysis
kbc,1                      ! stepped BC's
_thickRatio=0.5     ! Ratio of thick parts in the model
eqsl,sparse,,,,,1
cntr,print,1               ! print out contact info and also make no initial contact an error
dmpoption,emat,no             ! Don't combine emat file for DANSYS
dmpoption,esav,no             ! Don't combine esav file for DANSYS
trnopt,full,,,,,hht        ! HHT time integration method
betad,1.e-003       ! Beta damping, frequency dependent
tintp, mosp			! Choose transient integration settings for moderate speed application
nldiag,cont,iter           ! print out contact info each equilibrium iteration
rescontrol,define,last,last,,dele	   ! Program Controlled
/com,****************************************************
/com,******************* SOLVE FOR LS 1 OF 1 ****************
/com,*********** Create Acceleration ***********

*DIM,_acelx,TABLE,6,1,1,TIME,
! Time values
_acelx(1,0,1) = 0.
_acelx(2,0,1) = 0.15
_acelx(3,0,1) = 0.3
_acelx(4,0,1) = 0.45
_acelx(5,0,1) = 0.6
_acelx(6,0,1) = 1.5
! Load values
_acelx(1,1,1) = 0.
_acelx(2,1,1) = 0.
_acelx(3,1,1) = 0.
_acelx(4,1,1) = 0.
_acelx(5,1,1) = 0.
_acelx(6,1,1) = 0.


*DIM,_acely,TABLE,6,1,1,TIME,
! Time values
_acely(1,0,1) = 0.
_acely(2,0,1) = 0.15
_acely(3,0,1) = 0.3
_acely(4,0,1) = 0.45
_acely(5,0,1) = 0.6
_acely(6,0,1) = 1.5
! Load values
_acely(1,1,1) = 0.
_acely(2,1,1) = 10000.
_acely(3,1,1) = 0.
_acely(4,1,1) = -10000.
_acely(5,1,1) = 0.
_acely(6,1,1) = 0.


*DIM,_acelz,TABLE,6,1,1,TIME,
! Time values
_acelz(1,0,1) = 0.
_acelz(2,0,1) = 0.15
_acelz(3,0,1) = 0.3
_acelz(4,0,1) = 0.45
_acelz(5,0,1) = 0.6
_acelz(6,0,1) = 1.5
! Load values
_acelz(1,1,1) = 0.
_acelz(2,1,1) = 0.
_acelz(3,1,1) = 0.
_acelz(4,1,1) = 0.
_acelz(5,1,1) = 0.
_acelz(6,1,1) = 0.

acel,%_acelx%,%_acely%,%_acelz%
autots,on                   ! User turned on automatic time stepping
deltim,0.005,0.001,0.02,OFF
time,1.5
timint,on                  ! Turn on time integration effects
outres,erase
outres,all,none
outres,nsol,-100,
outres,rsol,-100
outres,eangl,-100
outres,etmp,-100
outres,veng,-100
outres,strs,-100,
outres,cont,-100,
outres,v,-100,
outres,a,-100,
! *********** WB SOLVE COMMAND ***********
! check interactive state
*get,ANSINTER_,active,,int
*if,ANSINTER_,ne,0,then
/eof
*endif
solve
/com *************** Write FE CONNECTORS *********
CEWRITE,file,ce,,INTE
/com,****************************************************
/com,*************** FINISHED SOLVE FOR LS 1 *************
/post1
fini
