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/batch
! ANSYS input file written by Workbench version 2021 R1
! File used for geometry attach: C:\Users\ASUS\Documents\ANSYS\ANSYS2021\Sec11-1\Gearbox_files\dp0\SYS\DM\SYS.agdb
/title,Gearbox--Modal (B5)
/com,--- Data in consistent NMM units. See Solving Units in the help system for more information.
/units,MPA
/prep7
! Turn off shape checking because checks already performed inside WB mesher.
! See help system for more information.
SHPP,OFF,,NOWARN
etcon,set             ! allow ANSYS to choose best KEYOP's for 180x elements, resets any applicable keyopt to MAPDL defaults
/com,*********** Nodes for the whole assembly ***********
nblock,3,,17934
(1i9,3e20.9e3)
        1    -1.932258065E+02    -1.700000000E+02    -7.363636364E+01
        2    -1.932258065E+02    -1.700000000E+02    -5.727272727E+01
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-1
/com,*********** Elements for Body 1 "Housing" ***********
et,1,181
keyo,1,3,2
eblock,19,solid,,1221
(19i9)
        1        1        1        1        0        0        0        0        4        0    10992    16185    15030    16186    16186
        1        1        1        1        0        0        0        0        4        0    10993    16193    16192    16264    16264
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-1
/com,*********** Elements for Body 2 "Flange" ***********
et,2,187
eblock,19,solid,,7024
(19i9)
        2        2        2        2        0        0        0        0       10        0      342     3980     3988     4585     4568    13276    13309    13280    13278
    13308    15025
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-1
/com,*********** Elements for Body 3 "Base" ***********
et,3,186
keyo,3,2,1          ! set full integration on SOLID186
eblock,19,solid,,341
(19i9)
        3        3        3        3        0        0        0        0       20        0        1      300      726      727      728      301      643      642      641
     1707     2559     2560     1708     1712     2432     2430     1711     1706     2435     2433     2431
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-1
/com,*********** Send User Defined Coordinate System(s) ***********
csys,0
toffst,273.15,  ! Temperature offset from absolute zero
/com,*********** Set Reference Temperature ***********
tref,22.
/com,*********** Send Materials ***********
Temperature = 'TEMP' ! Temperature
MP,DENS,1,7.75e-09,	! tonne mm^-3
MP,ALPX,1,1.7e-05,	! C^-1
MP,C,1,480000000,	! mm^2 s^-2 C^-1
MP,KXX,1,15.1,	! tonne mm s^-3 C^-1
MP,RSVX,1,0.00077,	! ohm mm
MP,EX,1,193000,	! tonne s^-2 mm^-1
MP,NUXY,1,0.31,
MP,MURX,1,1,

Temperature = 'TEMP' ! Temperature
MP,DENS,2,7.2e-09,	! tonne mm^-3
MP,ALPX,2,1.1e-05,	! C^-1
MP,C,2,447000000,	! mm^2 s^-2 C^-1
MP,KXX,2,52,	! tonne mm s^-3 C^-1
MP,RSVX,2,9.6e-05,	! ohm mm
MP,EX,2,110000,	! tonne s^-2 mm^-1
MP,NUXY,2,0.28,
MP,MURX,2,10000,

Temperature = 'TEMP' ! Temperature
MP,DENS,3,7.2e-09,	! tonne mm^-3
MP,ALPX,3,1.1e-05,	! C^-1
MP,C,3,447000000,	! mm^2 s^-2 C^-1
MP,KXX,3,52,	! tonne mm s^-3 C^-1
MP,RSVX,3,9.6e-05,	! ohm mm
MP,EX,3,110000,	! tonne s^-2 mm^-1
MP,NUXY,3,0.28,
MP,MURX,3,10000,

/com,*********** Send Sheet Properties ***********
sectype,1,shell
secdata,3.
secoff,mid

!************************* Model Summary ********************
!Housing,	Stainless Steel,	matid,	1
!Flange,	Gray Cast Iron,	matid,	2
!Base,	Gray Cast Iron,	matid,	3
!************************* End Model Summary ********************
/com,*********** Create Contact "Contact Region" ***********
*set,tid,5
*set,cid,4
r,tid
r,cid
et,tid,170
et,cid,174
eblock,10,,,243
(15i9)
    12213        5        5        5        0    16185    15030    16186    16186
    12214        5        5        5        0    16008    15993    15994    15994
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-1
eblock,10,,,243
(15i9)
    12456        4        4        4        0    16185    15030    16186    16186
    12457        4        4        4        0    16008    15993    15994    15994
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-1
eblock,10,,,350
(15i9)
    12699        4        5        4        0     2625     2675     2634     2634     4767     4830     2634     4765
    12700        4        5        4        0     2632     2633     2676     2676     4817     4825     2676     4818
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-1
eblock,10,,,350
(15i9)
    13049        5        4        5        0     2625     2675     2634     2634     4767     4830     2634     4765
    13050        5        4        5        0     2632     2633     2676     2676     4817     4825     2676     4818
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-1
keyo,cid,8,2               ! auto create asymmetric contact (from Program Controlled setting)
keyo,cid,10,0              ! adjust contact stiffness each NR iteration (from Program Controlled setting)
keyo,cid,12,5              ! bonded always
keyo,cid,18,1              ! small sliding turned on by application
keyo,cid,2,0               ! augmented Lagrange (from Program Controlled setting)
keyo,cid,4,0               ! on Gauss point (from Program Controlled setting)
keyo,cid,9,1               ! ignore initial gaps/penetration
keyo,cid,7,0               ! No Prediction
rmod,tid,3,10.      ! FKN
rmod,tid,5,0.       ! ICONT
rmod,tid,6,-1.7234141104491   ! PINB
rmod,tid,10,0.      ! CNOF
rmod,tid,12,0.      ! FKT
rmod,tid,36,32      ! WB DSID
rmod,cid,3,10.      ! FKN
rmod,cid,5,0.       ! ICONT
rmod,cid,6,-1.7234141104491   ! PINB
rmod,cid,10,0.      ! CNOF
rmod,cid,12,0.      ! FKT
rmod,cid,36,32      ! WB DSID
/com,*********** Create Contact "Bonded - Housing To Base" ***********
*set,tid,7
*set,cid,6
r,tid
r,cid
et,tid,170
et,cid,175
mat,6
real,6
type,6
en,13399,15064
en,13400,15109
en,13401,15119
en,13402,15120
en,13403,15121
en,13404,15122
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en,13462,15288
eblock,10,,,341
(15i9)
    13463        7        6        7        0      726      300      728      727     1707     1708     2560     2559
    13464        7        6        7        0      300      290      729      728     1675     1677     2561     1708
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-1
keyo,cid,10,0              ! adjust contact stiffness each NR iteration (from Program Controlled setting)
keyo,cid,12,5              ! bonded always
keyo,cid,18,1              ! small sliding turned on by application
keyo,cid,2,0               ! augmented Lagrange (from Program Controlled setting)
keyo,cid,9,1               ! ignore initial gaps/penetration
keyo,cid,7,0               ! No Prediction
rmod,cid,3,10.      ! FKN
rmod,cid,5,0.       ! ICONT
rmod,cid,6,1.       ! PINB
rmod,cid,10,0.      ! CNOF
rmod,cid,12,0.      ! FKT
rmod,cid,36,39      ! WB DSID
nsel,all
esel,all
/com,*********** Fixed Supports ***********
CMBLOCK,_FIXEDSU,NODE,     1108
(8i10)
       301       302       303       304       305       306       307       308
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cmsel,s,_FIXEDSU
d,all,all
nsel,all
fini
/solu
antype,2                   ! modal analysis
_thickRatio=0.333   ! Ratio of thick parts in the model
modopt,lanb,6
outres,erase
outres,all,none
outres,nsol,all
outres,etmp,all
mxpand                    ! default expand in case of complex solution
dmpopt,esav,no
dmpopt,emat,no
dmpopt,full,no
! *********** WB SOLVE COMMAND ***********
! check interactive state
*get,ANSINTER_,active,,int
*if,ANSINTER_,ne,0,then
/eof
*endif
solve
/com *************** Write FE CONNECTORS *********
CEWRITE,file,ce,,INTE
*get,_nmodalsolproc,active,0,numcpu
fini
/post1
*dim,_direction,CHAR,6,1
_direction(1) = 'X'
_direction(2) = 'Y'
_direction(3) = 'Z'
_direction(4) = 'ROTX'
_direction(5) = 'ROTY'
_direction(6) = 'ROTZ'
*get,_lastLS,active,0,set,LSTP
*get,_beginset,active,0,set,nset,first,_lastLS
*get,_endset,active,0,set,nset,last,_lastLS
_nummodes = 0
*if,_endset,gt,0,then
_nummodes = _endset - _beginset + 1
*endif
*do,i_mode,1,_nummodes
   *do,j_component,1,6
			*get,PFACT_%i_mode%_%j_component%,MODE,%i_mode%,PFACT,,DIREC,_direction(%j_component%)
   *enddo
*enddo
*dim,_tmdirection,CHAR,6,1
_tmdirection(1) = 'X'
_tmdirection(2) = 'Y'
_tmdirection(3) = 'Z'
_tmdirection(4) = 'X'
_tmdirection(5) = 'Y'
_tmdirection(6) = 'Z'
*do,j_component,1,6
    *if,j_component,gt,3,then
        *get,TOTALMASS_%j_component%,ELEM,0,IOR,_tmdirection(%j_component%)
    *else
        *get,TOTALMASS_%j_component%,ELEM,0,MTOT,_tmdirection(%j_component%)
    *endif
*enddo
fini
