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/batch
! ANSYS input file written by Workbench version 2021 R1
! File used for geometry attach: C:\Users\ASUS\Documents\ANSYS\ANSYS2021\Sec11-1\Gearbox_files\dp0\SYS\DM\SYS.agdb
/title,Gearbox--Static Structural (A5)
/com,--- Data in consistent NMM units. See Solving Units in the help system for more information.
/units,MPA
/prep7
! Turn off shape checking because checks already performed inside WB mesher.
! See help system for more information.
SHPP,OFF,,NOWARN
etcon,set             ! allow ANSYS to choose best KEYOP's for 180x elements, resets any applicable keyopt to MAPDL defaults
/com,*********** Nodes for the whole assembly ***********
nblock,3,,17934
(1i9,3e20.9e3)
        1    -1.932258065E+02    -1.700000000E+02    -7.363636364E+01
        2    -1.932258065E+02    -1.700000000E+02    -5.727272727E+01
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-1
/com,*********** Elements for Body 1 "Housing" ***********
et,1,181
keyo,1,3,2
eblock,19,solid,,1221
(19i9)
        1        1        1        1        0        0        0        0        4        0    10992    16185    15030    16186    16186
        1        1        1        1        0        0        0        0        4        0    10993    16193    16192    16264    16264
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-1
/com,*********** Elements for Body 2 "Flange" ***********
et,2,187
eblock,19,solid,,7024
(19i9)
        2        2        2        2        0        0        0        0       10        0      342     3980     3988     4585     4568    13276    13309    13280    13278
    13308    15025
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-1
/com,*********** Elements for Body 3 "Base" ***********
et,3,186
keyo,3,2,1          ! set full integration on SOLID186
eblock,19,solid,,341
(19i9)
        3        3        3        3        0        0        0        0       20        0        1      300      726      727      728      301      643      642      641
     1707     2559     2560     1708     1712     2432     2430     1711     1706     2435     2433     2431
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-1
/com,*********** Send User Defined Coordinate System(s) ***********
csys,0
toffst,273.15,  ! Temperature offset from absolute zero
/com,*********** Set Reference Temperature ***********
tref,22.
/com,*********** Send Materials ***********
Temperature = 'TEMP' ! Temperature
MP,DENS,1,7.75e-09,	! tonne mm^-3
MP,ALPX,1,1.7e-05,	! C^-1
MP,C,1,480000000,	! mm^2 s^-2 C^-1
MP,KXX,1,15.1,	! tonne mm s^-3 C^-1
MP,RSVX,1,0.00077,	! ohm mm
MP,EX,1,193000,	! tonne s^-2 mm^-1
MP,NUXY,1,0.31,
MP,MURX,1,1,

Temperature = 'TEMP' ! Temperature
MP,DENS,2,7.2e-09,	! tonne mm^-3
MP,ALPX,2,1.1e-05,	! C^-1
MP,C,2,447000000,	! mm^2 s^-2 C^-1
MP,KXX,2,52,	! tonne mm s^-3 C^-1
MP,RSVX,2,9.6e-05,	! ohm mm
MP,EX,2,110000,	! tonne s^-2 mm^-1
MP,NUXY,2,0.28,
MP,MURX,2,10000,

Temperature = 'TEMP' ! Temperature
MP,DENS,3,7.2e-09,	! tonne mm^-3
MP,ALPX,3,1.1e-05,	! C^-1
MP,C,3,447000000,	! mm^2 s^-2 C^-1
MP,KXX,3,52,	! tonne mm s^-3 C^-1
MP,RSVX,3,9.6e-05,	! ohm mm
MP,EX,3,110000,	! tonne s^-2 mm^-1
MP,NUXY,3,0.28,
MP,MURX,3,10000,

/com,*********** Send Sheet Properties ***********
sectype,1,shell
secdata,3.
secoff,mid

!************************* Model Summary ********************
!Housing,	Stainless Steel,	matid,	1
!Flange,	Gray Cast Iron,	matid,	2
!Base,	Gray Cast Iron,	matid,	3
!************************* End Model Summary ********************
/com,*********** Create Contact "Contact Region" ***********
*set,tid,5
*set,cid,4
r,tid
r,cid
et,tid,170
et,cid,174
eblock,10,,,243
(15i9)
    12213        5        5        5        0    16185    15030    16186    16186
    12214        5        5        5        0    16008    15993    15994    15994
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-1
eblock,10,,,243
(15i9)
    12456        4        4        4        0    16185    15030    16186    16186
    12457        4        4        4        0    16008    15993    15994    15994
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-1
eblock,10,,,350
(15i9)
    12699        4        5        4        0     2625     2675     2634     2634     4767     4830     2634     4765
    12700        4        5        4        0     2632     2633     2676     2676     4817     4825     2676     4818
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-1
eblock,10,,,350
(15i9)
    13049        5        4        5        0     2625     2675     2634     2634     4767     4830     2634     4765
    13050        5        4        5        0     2632     2633     2676     2676     4817     4825     2676     4818
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-1
keyo,cid,8,2               ! auto create asymmetric contact (from Program Controlled setting)
keyo,cid,10,0              ! adjust contact stiffness each NR iteration (from Program Controlled setting)
keyo,cid,12,5              ! bonded always
keyo,cid,18,1              ! small sliding turned on by application
keyo,cid,2,0               ! augmented Lagrange (from Program Controlled setting)
keyo,cid,4,0               ! on Gauss point (from Program Controlled setting)
keyo,cid,9,1               ! ignore initial gaps/penetration
keyo,cid,7,0               ! No Prediction
rmod,tid,3,10.      ! FKN
rmod,tid,5,0.       ! ICONT
rmod,tid,6,-1.7234141104491   ! PINB
rmod,tid,10,0.      ! CNOF
rmod,tid,12,0.      ! FKT
rmod,tid,36,32      ! WB DSID
rmod,cid,3,10.      ! FKN
rmod,cid,5,0.       ! ICONT
rmod,cid,6,-1.7234141104491   ! PINB
rmod,cid,10,0.      ! CNOF
rmod,cid,12,0.      ! FKT
rmod,cid,36,32      ! WB DSID
/com,*********** Create Contact "Bonded - Housing To Base" ***********
*set,tid,7
*set,cid,6
r,tid
r,cid
et,tid,170
et,cid,175
mat,6
real,6
type,6
en,13399,15064
en,13400,15109
en,13401,15119
en,13402,15120
en,13403,15121
en,13404,15122
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en,13462,15288
eblock,10,,,341
(15i9)
    13463        7        6        7        0      726      300      728      727     1707     1708     2560     2559
    13464        7        6        7        0      300      290      729      728     1675     1677     2561     1708
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-1
keyo,cid,10,0              ! adjust contact stiffness each NR iteration (from Program Controlled setting)
keyo,cid,12,5              ! bonded always
keyo,cid,18,1              ! small sliding turned on by application
keyo,cid,2,0               ! augmented Lagrange (from Program Controlled setting)
keyo,cid,9,1               ! ignore initial gaps/penetration
keyo,cid,7,0               ! No Prediction
rmod,cid,3,10.      ! FKN
rmod,cid,5,0.       ! ICONT
rmod,cid,6,1.       ! PINB
rmod,cid,10,0.      ! CNOF
rmod,cid,12,0.      ! FKT
rmod,cid,36,39      ! WB DSID
nsel,all
esel,all
CMBLOCK,_CM43_FIXEDSU,NODE,     1108
(8i10)
       301       302       303       304       305       306       307       308
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/com,*********** Fixed Supports ***********
CMBLOCK,_FIXEDSU,NODE,     1108
(8i10)
       301       302       303       304       305       306       307       308
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cmsel,s,_FIXEDSU
d,all,all
nsel,all
/com,*********** Define Force Using Surface Effect Elements ***********
local,12,0,0.,0.,0.,0.,0.,0.
csys,0
et,8,154
eblock,10,,,206
(15i9)
    13804        8        8        8       12     3011     3000     3480     3480     7371     7372     3480     7447
    13805        8        8        8       12     3093     3104     3479     3479     8005     8080     3479     8006
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-1
esel,s,type,,8
keyop,8,2,1                ! Apply load in local coordinate system
keyop,8,7,1                ! Use original area so load is constant in large deformation
esel,all
/com,*********** Define Force Using Surface Effect Elements ***********
local,13,0,0.,0.,0.,0.,0.,0.
csys,0
et,9,154
eblock,10,,,124
(15i9)
    14010        9        9        9       13     2674     2685     3570     3570     5105     5167     3570     5106
    14011        9        9        9       13     2661     2650     3571     3571     4957     4958     3571     5022
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-1
esel,s,type,,9
keyop,9,2,1                ! Apply load in local coordinate system
keyop,9,7,1                ! Use original area so load is constant in large deformation
esel,all
/com,*********** Create Bearing Load ***********
et,10,154
eblock,10,,,206
(15i9)
    14134       10       10       10        0     3011     3000     3480     3480     7371     7372     3480     7447
    14135       10       10       10        0     3093     3104     3479     3479     8005     8080     3479     8006
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-1
esel,s,type,,10
keyop,10,7,1                ! Use original area so load is constant in large deformation
esel,all
/com,*********** Create Bearing Load ***********
et,11,154
eblock,10,,,204
(15i9)
    14340       11       11       11        0     2662     2673     3390     3390     5026     5098     3390     5027
    14341       11       11       11        0     2883     2872     3389     3389     6493     6494     3389     6570
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-1
esel,s,type,,11
keyop,11,7,1                ! Use original area so load is constant in large deformation
esel,all
/com,*********** Create Bearing Load ***********
et,12,154
eblock,10,,,124
(15i9)
    14544       12       12       12        0     2988     2999     3621     3621     7305     7367     3621     7306
    14545       12       12       12        0     3023     3012     3620     3620     7454     7455     3620     7515
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-1
esel,s,type,,12
keyop,12,7,1                ! Use original area so load is constant in large deformation
esel,all
/com,*********** Create Bearing Load ***********
et,13,154
eblock,10,,,124
(15i9)
    14668       13       13       13        0     2674     2685     3570     3570     5105     5167     3570     5106
    14669       13       13       13        0     2661     2650     3571     3571     4957     4958     3571     5022
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-1
esel,s,type,,13
keyop,13,7,1                ! Use original area so load is constant in large deformation
esel,all
fini
/com,****************************************************************************
/com,*************************    SOLUTION       ********************************
/com,****************************************************************************
/solu
antype,0                   ! static analysis
nlgeom,on                  ! Turn on Large Deformation Effects
_thickRatio=0.333   ! Ratio of thick parts in the model
eqsl,sparse,,,,,1
cntr,print,1               ! print out contact info and also make no initial contact an error
nldiag,cont,iter           ! print out contact info each equilibrium iteration
rescontrol,define,last           ! Turn on restart files due to future eigen analysis intent
/com,****************************************************
/com,******************* SOLVE FOR LS 1 OF 1 ****************
esel,s,type,,8
nsle
sfe,all,1,pres,1,0.
sfe,all,2,pres,1,0.
sfe,all,3,pres,1,1.81895257742279
esel,s,type,,9
nsle
sfe,all,1,pres,1,0.
sfe,all,2,pres,1,0.
sfe,all,3,pres,1,-1.21263913117792
nsel,all
esel,all
esel,s,type,,10
sfe,all,5,pres,0,0.0,1.,0.,0.
local,11,0,0,0,0,61.927513064147,0.,0.
csys,0
*set,_v1,0.470588235294118
*set,_v2,0.882352941176471
*set,_v3,0.
*get,_necurr,elem,,count
_ecurr=0
_total=0
*do,_i,1,_necurr
  _ecurr = ELNEXT(_ecurr)
  _normx = NORMNX(NELEM(_ecurr,1),NELEM(_ecurr,2),NELEM(_ecurr,3))
  _normy = NORMNY(NELEM(_ecurr,1),NELEM(_ecurr,2),NELEM(_ecurr,3))
  _normz = NORMNZ(NELEM(_ecurr,1),NELEM(_ecurr,2),NELEM(_ecurr,3))
  _normmag = sqrt(_normx*_normx + _normy*_normy + _normz*_normz )
  _normx = _normx/_normmag
  _normy = _normy/_normmag
  _normz = _normz/_normmag
  _dot = _normx*_v1+_normy*_v2+_normz*_v3
  *if,_dot,gt,-.00001,then
    esel,u,elem,,_ecurr
  *else
    csys,11
    *get,_indd,elem,_ecurr,aproj,x
    csys,0
    _total=_total+_indd
  *endif
*enddo
*get,_necurr,elem,,count
*if,_necurr,eq,0,then
  *msg,error
  NO ELEMENTS ARE SELECTED TO APPLY BEARING LOAD TO. &
  IT IS LIKELY THAT THE BEARING LOAD IS IN THE WRONG DIRECTION
*endif
*set,_mag,34000.
_mag=_mag/_total
sfe,all,5,pres,0,_mag,16000.,30000.,0.
nsel,all
esel,all
esel,s,type,,11
sfe,all,5,pres,0,0.0,1.,0.,0.
local,11,0,0,0,0,78.6900675259798,0.,0.
csys,0
*set,_v1,0.196116135138184
*set,_v2,0.98058067569092
*set,_v3,0.
*get,_necurr,elem,,count
_ecurr=0
_total=0
*do,_i,1,_necurr
  _ecurr = ELNEXT(_ecurr)
  _normx = NORMNX(NELEM(_ecurr,1),NELEM(_ecurr,2),NELEM(_ecurr,3))
  _normy = NORMNY(NELEM(_ecurr,1),NELEM(_ecurr,2),NELEM(_ecurr,3))
  _normz = NORMNZ(NELEM(_ecurr,1),NELEM(_ecurr,2),NELEM(_ecurr,3))
  _normmag = sqrt(_normx*_normx + _normy*_normy + _normz*_normz )
  _normx = _normx/_normmag
  _normy = _normy/_normmag
  _normz = _normz/_normmag
  _dot = _normx*_v1+_normy*_v2+_normz*_v3
  *if,_dot,gt,-.00001,then
    esel,u,elem,,_ecurr
  *else
    csys,11
    *get,_indd,elem,_ecurr,aproj,x
    csys,0
    _total=_total+_indd
  *endif
*enddo
*get,_necurr,elem,,count
*if,_necurr,eq,0,then
  *msg,error
  NO ELEMENTS ARE SELECTED TO APPLY BEARING LOAD TO. &
  IT IS LIKELY THAT THE BEARING LOAD IS IN THE WRONG DIRECTION
*endif
*set,_mag,30594.1170815567
_mag=_mag/_total
sfe,all,5,pres,0,_mag,6000.,30000.,0.
nsel,all
esel,all
esel,s,type,,12
sfe,all,5,pres,0,0.0,1.,0.,0.
local,11,0,0,0,0,-84.2894068625004,0.,0.
csys,0
*set,_v1,9.95037190209989e-002
*set,_v2,-0.995037190209989
*set,_v3,0.
*get,_necurr,elem,,count
_ecurr=0
_total=0
*do,_i,1,_necurr
  _ecurr = ELNEXT(_ecurr)
  _normx = NORMNX(NELEM(_ecurr,1),NELEM(_ecurr,2),NELEM(_ecurr,3))
  _normy = NORMNY(NELEM(_ecurr,1),NELEM(_ecurr,2),NELEM(_ecurr,3))
  _normz = NORMNZ(NELEM(_ecurr,1),NELEM(_ecurr,2),NELEM(_ecurr,3))
  _normmag = sqrt(_normx*_normx + _normy*_normy + _normz*_normz )
  _normx = _normx/_normmag
  _normy = _normy/_normmag
  _normz = _normz/_normmag
  _dot = _normx*_v1+_normy*_v2+_normz*_v3
  *if,_dot,gt,-.00001,then
    esel,u,elem,,_ecurr
  *else
    csys,11
    *get,_indd,elem,_ecurr,aproj,x
    csys,0
    _total=_total+_indd
  *endif
*enddo
*get,_necurr,elem,,count
*if,_necurr,eq,0,then
  *msg,error
  NO ELEMENTS ARE SELECTED TO APPLY BEARING LOAD TO. &
  IT IS LIKELY THAT THE BEARING LOAD IS IN THE WRONG DIRECTION
*endif
*set,_mag,30149.6268633627
_mag=_mag/_total
sfe,all,5,pres,0,_mag,3000.,-30000.,0.
nsel,all
esel,all
esel,s,type,,13
sfe,all,5,pres,0,0.0,1.,0.,0.
local,11,0,0,0,0,-129.805571092265,0.,0.
csys,0
*set,_v1,-0.64018439966448
*set,_v2,-0.768221279597376
*set,_v3,0.
*get,_necurr,elem,,count
_ecurr=0
_total=0
*do,_i,1,_necurr
  _ecurr = ELNEXT(_ecurr)
  _normx = NORMNX(NELEM(_ecurr,1),NELEM(_ecurr,2),NELEM(_ecurr,3))
  _normy = NORMNY(NELEM(_ecurr,1),NELEM(_ecurr,2),NELEM(_ecurr,3))
  _normz = NORMNZ(NELEM(_ecurr,1),NELEM(_ecurr,2),NELEM(_ecurr,3))
  _normmag = sqrt(_normx*_normx + _normy*_normy + _normz*_normz )
  _normx = _normx/_normmag
  _normy = _normy/_normmag
  _normz = _normz/_normmag
  _dot = _normx*_v1+_normy*_v2+_normz*_v3
  *if,_dot,gt,-.00001,then
    esel,u,elem,,_ecurr
  *else
    csys,11
    *get,_indd,elem,_ecurr,aproj,x
    csys,0
    _total=_total+_indd
  *endif
*enddo
*get,_necurr,elem,,count
*if,_necurr,eq,0,then
  *msg,error
  NO ELEMENTS ARE SELECTED TO APPLY BEARING LOAD TO. &
  IT IS LIKELY THAT THE BEARING LOAD IS IN THE WRONG DIRECTION
*endif
*set,_mag,39051.2483795333
_mag=_mag/_total
sfe,all,5,pres,0,_mag,-25000.,-30000.,0.
nsel,all
esel,all
autots,on                  ! Workbench Program Controlled automatic time stepping
nsub,1,10,1                ! due to presence of general nonlinear
time,1.
outres,erase
outres,all,none
outres,nsol,all,
outres,rsol,all
outres,eangl,all
outres,etmp,all
outres,veng,all
outres,strs,all,
outres,epel,all,
outres,eppl,all,
outres,cont,all,
! *********** WB SOLVE COMMAND ***********
! check interactive state
*get,ANSINTER_,active,,int
*if,ANSINTER_,ne,0,then
/eof
*endif
solve
/com *************** Write FE CONNECTORS *********
CEWRITE,file,ce,,INTE
/com,****************************************************
/com,*************** FINISHED SOLVE FOR LS 1 *************
/post1
fini
