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/batch
! ANSYS input file written by Workbench version 2021 R1
! File used for geometry attach: C:\Users\ASUS\Documents\ANSYS\ANSYS2021\Sec11-2\Building_files\dp0\SYS-1\DM\SYS-1.agdb
/title,Building--Static Structural (B5)
/com,--- Data in consistent BIN units. See Solving Units in the help system for more information.
/units,BIN
/prep7
! Turn off shape checking because checks already performed inside WB mesher.
! See help system for more information.
SHPP,OFF,,NOWARN
etcon,set             ! allow ANSYS to choose best KEYOP's for 180x elements, resets any applicable keyopt to MAPDL defaults
/com,*********** Nodes for the whole assembly ***********
nblock,3,,965
(1i9,3e20.9e3)
        1     4.800000000E+02     2.400000000E+02     0.000000000E+00
        2     7.200000000E+02     2.400000000E+02     0.000000000E+00
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-1
/com,*********** Elements for Body 1 "Line Body" ***********
et,1,188
keyo,1,3,2
eblock,19,solid,,224
(19i9)
        1        1        1        1        0        0        0        0        3        0      385        1        3      575
        1        1        1        1        0        0        0        0        3        0      386        3        4      576
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-1
/com,*********** Elements for Body 2 "Surface Body" ***********
et,2,181
keyo,2,3,2
eblock,19,solid,,64
(19i9)
        2        2        2        2        0        0        0        0        4        0        1      527      530      526      574
        2        2        2        2        0        0        0        0        4        0        2      574      528      531      527
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-1
/com,*********** Elements for Body 3 "Surface Body" ***********
et,3,181
keyo,3,3,2
eblock,19,solid,,64
(19i9)
        3        3        3        3        0        0        0        0        4        0       65      521      481      477      525
        3        3        3        3        0        0        0        0        4        0       66      525      478      482      521
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-1
/com,*********** Elements for Body 4 "Surface Body" ***********
et,4,181
keyo,4,3,2
eblock,19,solid,,64
(19i9)
        4        4        4        4        0        0        0        0        4        0      129      428      431      467      476
        4        4        4        4        0        0        0        0        4        0      130      476      468      432      428
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-1
/com,*********** Elements for Body 5 "Surface Body" ***********
et,5,181
keyo,5,3,2
eblock,19,solid,,64
(19i9)
        5        5        5        5        0        0        0        0        4        0      193      423      382      379      427
        5        5        5        5        0        0        0        0        4        0      194      427      380      383      423
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-1
/com,*********** Elements for Body 6 "Surface Body" ***********
et,6,181
keyo,6,3,2
eblock,19,solid,,64
(19i9)
        6        6        6        6        0        0        0        0        4        0      257      331      334      330      378
        6        6        6        6        0        0        0        0        4        0      258      378      332      335      331
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-1
/com,*********** Elements for Body 7 "Surface Body" ***********
et,7,181
keyo,7,3,2
eblock,19,solid,,64
(19i9)
        7        7        7        7        0        0        0        0        4        0      321      282      286      281      329
        7        7        7        7        0        0        0        0        4        0      322      329      283      287      282
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-1
/com,*********** Elements for Body 8 "Line Body" ***********
et,8,188
keyo,8,3,2
eblock,19,solid,,40
(19i9)
        8        8        8        8        0        0        0        0        3        0      609      135      223      799
        8        8        8        8        0        0        0        0        3        0      610      223      224      800
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-1
/com,*********** Elements for Body 9 "Line Body" ***********
et,9,188
keyo,9,3,2
eblock,19,solid,,40
(19i9)
        9        9        9        9        0        0        0        0        3        0      649        1      273      839
        9        9        9        9        0        0        0        0        3        0      650      273      274      840
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-1
/com,*********** Send User Defined Coordinate System(s) ***********
csys,0
toffst,459.67,  ! Temperature offset from absolute zero
/com,*********** Set Reference Temperature ***********
tref,71.6
/com,*********** Send Materials ***********
Temperature = 'TEMP' ! Temperature
MP,DENS,1,0.000734544492879577,	! slinch in^-3
MP,ALPX,1,6.66666666666667e-06,	! F^-1
MP,C,1,373722.969668162,	! in^2 s^-2 F^-1
MP,KXX,1,7.55607836445752,	! slinch in s^-3 F^-1
MP,RSVX,1,8.52348993288591,	! ohm cmil in^-1
MP,EX,1,29007547.5428236,	! slinch s^-2 in^-1
MP,NUXY,1,0.3,
MP,MURX,1,10000,

Temperature = 'TEMP' ! Temperature
MP,DENS,2,0.000215216857786373,	! slinch in^-3
MP,ALPX,2,7.77777777777778e-06,	! F^-1
MP,C,2,671668.010002687,	! in^2 s^-2 F^-1
MP,KXX,2,0.0899235772299077,	! slinch in s^-3 F^-1
MP,EX,2,4351132.13142354,	! slinch s^-2 in^-1
MP,NUXY,2,0.18,

Temperature = 'TEMP' ! Temperature
MP,DENS,3,0.000215216857786373,	! slinch in^-3
MP,ALPX,3,7.77777777777778e-06,	! F^-1
MP,C,3,671668.010002687,	! in^2 s^-2 F^-1
MP,KXX,3,0.0899235772299077,	! slinch in s^-3 F^-1
MP,EX,3,4351132.13142354,	! slinch s^-2 in^-1
MP,NUXY,3,0.18,

Temperature = 'TEMP' ! Temperature
MP,DENS,4,0.000215216857786373,	! slinch in^-3
MP,ALPX,4,7.77777777777778e-06,	! F^-1
MP,C,4,671668.010002687,	! in^2 s^-2 F^-1
MP,KXX,4,0.0899235772299077,	! slinch in s^-3 F^-1
MP,EX,4,4351132.13142354,	! slinch s^-2 in^-1
MP,NUXY,4,0.18,

Temperature = 'TEMP' ! Temperature
MP,DENS,5,0.000215216857786373,	! slinch in^-3
MP,ALPX,5,7.77777777777778e-06,	! F^-1
MP,C,5,671668.010002687,	! in^2 s^-2 F^-1
MP,KXX,5,0.0899235772299077,	! slinch in s^-3 F^-1
MP,EX,5,4351132.13142354,	! slinch s^-2 in^-1
MP,NUXY,5,0.18,

Temperature = 'TEMP' ! Temperature
MP,DENS,6,0.000215216857786373,	! slinch in^-3
MP,ALPX,6,7.77777777777778e-06,	! F^-1
MP,C,6,671668.010002687,	! in^2 s^-2 F^-1
MP,KXX,6,0.0899235772299077,	! slinch in s^-3 F^-1
MP,EX,6,4351132.13142354,	! slinch s^-2 in^-1
MP,NUXY,6,0.18,

Temperature = 'TEMP' ! Temperature
MP,DENS,7,0.000215216857786373,	! slinch in^-3
MP,ALPX,7,7.77777777777778e-06,	! F^-1
MP,C,7,671668.010002687,	! in^2 s^-2 F^-1
MP,KXX,7,0.0899235772299077,	! slinch in s^-3 F^-1
MP,EX,7,4351132.13142354,	! slinch s^-2 in^-1
MP,NUXY,7,0.18,

Temperature = 'TEMP' ! Temperature
MP,DENS,8,0.000734544492879577,	! slinch in^-3
MP,ALPX,8,6.66666666666667e-06,	! F^-1
MP,C,8,373722.969668162,	! in^2 s^-2 F^-1
MP,KXX,8,7.55607836445752,	! slinch in s^-3 F^-1
MP,RSVX,8,8.52348993288591,	! ohm cmil in^-1
MP,EX,8,29007547.5428236,	! slinch s^-2 in^-1
MP,NUXY,8,0.3,
MP,MURX,8,10000,

Temperature = 'TEMP' ! Temperature
MP,DENS,9,0.000734544492879577,	! slinch in^-3
MP,ALPX,9,6.66666666666667e-06,	! F^-1
MP,C,9,373722.969668162,	! in^2 s^-2 F^-1
MP,KXX,9,7.55607836445752,	! slinch in s^-3 F^-1
MP,RSVX,9,8.52348993288591,	! ohm cmil in^-1
MP,EX,9,29007547.5428236,	! slinch s^-2 in^-1
MP,NUXY,9,0.3,
MP,MURX,9,10000,

/com,*********** Send Sheet Properties ***********
sectype,2,shell
secdata,5.
secoff,mid

sectype,3,shell
secdata,5.
secoff,mid

sectype,4,shell
secdata,5.
secoff,mid

sectype,5,shell
secdata,5.
secoff,mid

sectype,6,shell
secdata,5.
secoff,mid

sectype,7,shell
secdata,5.
secoff,mid

/com,*********** Send Beam Properties ***********
SECTYPE,1,BEAM,I
SECDATA,7.07,7.07,16.25,0.63,0.63,0.38
secoffset,cent

SECTYPE,8,BEAM,L
SECDATA,4.,4.,0.5,0.5
secoffset,cent

SECTYPE,9,BEAM,L
SECDATA,4.,4.,0.5,0.5
secoffset,cent

!************************* Model Summary ********************
!Line Body,	Structural Steel,	matid,	1
!Surface Body,	Concrete,	matid,	2
!Surface Body,	Concrete,	matid,	3
!Surface Body,	Concrete,	matid,	4
!Surface Body,	Concrete,	matid,	5
!Surface Body,	Concrete,	matid,	6
!Surface Body,	Concrete,	matid,	7
!Line Body,	Structural Steel,	matid,	8
!Line Body,	Structural Steel,	matid,	9
!************************* End Model Summary ********************
CMBLOCK,_CM43_FIXEDSU,NODE,        8
(8i10)
        80        88        96       104       112       120       128       136

/com,*********** Fixed Supports ***********
CMBLOCK,_FIXEDSU,NODE,        8
(8i10)
        80        88        96       104       112       120       128       136

cmsel,s,_FIXEDSU
d,all,all
nsel,all
/com,*********** Define Pressure Using Surface Effect Elements ***********
et,10,154
eblock,10,,,384
(15i9)
      689       10       10       10        0      527      530      526      574
      690       10       10       10        0      574      528      531      527
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-1
esel,s,type,,10
keyop,10,7,0                ! Use deformed area for application of load
esel,all
esel,all
fini
/com,****************************************************************************
/com,*************************    SOLUTION       ********************************
/com,****************************************************************************
/solu
antype,0                   ! static analysis
nlgeom,on                  ! Turn on Large Deformation Effects
_thickRatio=  0     ! Ratio of thick parts in the model
eqsl,sparse,,,,,1
cntr,print,1               ! print out contact info and also make no initial contact an error
nldiag,cont,iter           ! print out contact info each equilibrium iteration
rescontrol,define,last           ! Turn on restart files due to future eigen analysis intent
/com,****************************************************
/com,******************* SOLVE FOR LS 1 OF 1 ****************
esel,s,type,,10
nsle
sf,all,pres,0.347222222326302
nsel,all
esel,all
acel,0.,386.088582677165,0.
esel,all
autots,on                  ! Workbench Program Controlled automatic time stepping
nsub,1,10,1                ! due to presence of general nonlinear
time,1.
outres,erase
outres,all,none
outres,nsol,all,
outres,rsol,all
outres,eangl,all
outres,etmp,all
outres,veng,all
outres,strs,all,
outres,epel,all,
outres,eppl,all,
outres,cont,all,
esel,s,type,,1
esel,a,type,,8,9
cm,_elmisc,elem
esel,all
outres,misc,all,_elmisc
! *********** WB SOLVE COMMAND ***********
! check interactive state
*get,ANSINTER_,active,,int
*if,ANSINTER_,ne,0,then
/eof
*endif
solve
/com *************** Write FE CONNECTORS *********
CEWRITE,file,ce,,INTE
/com,****************************************************
/com,*************** FINISHED SOLVE FOR LS 1 *************
/post1
fini
