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/batch
! ANSYS input file written by Workbench version 2021 R1
/com,*********** Resuming The ANSYS db File from Modal Solution ***********
resume,file,db
/title,Building--Harmonic Response (C5)
/prep7
/com,*********** Defining Loadings ***********
/com,*********** Define Pressure Using Surface Effect Elements ***********
et,9,154
eblock,10,,,64
(15i9)
      993        9        9        9        0      214      218      213      261
      994        9        9        9        0      261      215      219      214
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-1
esel,s,type,,9
keyop,9,7,0                ! Use deformed area for application of load
esel,all

*DIM,_loadvari100,TABLE,1,1,1,TIME,
! Time values
_loadvari100(1,0,1) = 1.
! Load values
_loadvari100(1,1,1) = 1.00000000029975


*DIM,_loadvari100i,TABLE,1,1,1,TIME,
! Time values
_loadvari100i(1,0,1) = 1.
! Load values
_loadvari100i(1,1,1) = 0.

fini
/com,*********** Performing Modal Re-start ***********
/solu
antype,modal,restart    ! restarting the modal analysis
modcontrol,on
thexpand,off     ! ignore thermal strains
mxpand,,,,yes,,yes     ! expand requested results and write them to file.mode
outres,erase
outres,all,none
outres,nsol,all
outres,eangl,all
outres,etmp,all
outres,veng,all
outres,rsol,all
outres,cont,all
esel,s,type,,1
esel,a,type,,1
esel,a,type,,1
cm,_elmisc,elem
esel,all
outres,misc,all,_elmisc
fdele,all,all
sfdele,all,all
sfedele,all,all,all
acel,0,0,0                 ! zero out the acceleration
/com,*********** Setting and Solving Each Load Step ***********
esel,s,type,,9
nsle
sf,all,pres,1,0
nsel,all
esel,all
solve
fdele,all,all
sfdele,all,all
sfedele,all,all,all
acel,0,0,0                 ! zero out the acceleration
/com,*********** Setting and Solving Each Load Step ***********
esel,s,type,,9
nsle
sf,all,pres,0,1
nsel,all
esel,all
solve
/com *************** Write FE CONNECTORS *********
CEWRITE,file,ce,,INTE
fini
/com,*********** Performing MSUP Harmonic Solve ***********
/solu
antype,harm
hropt,msup
thexpand,off     ! ignore thermal strains
hrout,off,on
kbc,1
harfrq,0.000000,50.000000
nsub,4
dmprat,1.e-002      ! Constant Damping Ratio
fdele,all,all
sfdele,all,all
sfedele,all,all,all
acel,0,0,0                 ! zero out the acceleration
lvscale,0,1
/com,*********** Scaling Each Load Step for MSUP Solve ***********
lvscale,%_loadvari100%,1
lvscale,%_loadvari100i%,2
! *********** WB SOLVE COMMAND ***********
! check interactive state
*get,ANSINTER_,active,,int
*if,ANSINTER_,ne,0,then
/eof
*endif
solve

fini
! ------- MSUP EXPANSION PASS -------
/solu
expass,on
hrexp,all
outres,erase
outres,all,none
outres,nsol,all
outres,eangl,all
outres,etmp,all
outres,veng,all
outres,rsol,all
outres,cont,all
outres,misc,all,_elmisc
numexp,all,,,yes        ! expand results at all freq. and calculate requested result items
! *********** WB SOLVE COMMAND ***********
! check interactive state
*get,ANSINTER_,active,,int
*if,ANSINTER_,ne,0,then
/eof
*endif
solve
fini
/post1
fini
