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/batch
! ANSYS input file written by Workbench version 2021 R1
! File used for geometry attach: C:\Users\ASUS\Documents\ANSYS\ANSYS2021\Sec12-4\Disk_files\dp0\SYS\DM\SYS.agdb
/title,Disk--Transient (A5)
/com,--- Data in consistent NMM units. See Solving Units in the help system for more information.
/units,MPA
/prep7
! Turn off shape checking because checks already performed inside WB mesher.
! See help system for more information.
SHPP,OFF,,NOWARN
etcon,set             ! allow ANSYS to choose best KEYOP's for 180x elements, resets any applicable keyopt to MAPDL defaults
/com,*********** Nodes for the whole assembly ***********
nblock,3,,4227
(1i9,3e20.9e3)
        1    -0.000000000E+00     2.000000000E+02     0.000000000E+00
        2     0.000000000E+00     0.000000000E+00     0.000000000E+00
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-1
/com,*********** Elements for Body 1 "Block" ***********
et,1,183
keyo,1,3,3
eblock,19,solid,,551
(19i9)
        1        1        1        1        0        0        0        0        8        0        1      398      601      580      580     1577     1781      580     1576
        1        1        1        1        0        0        0        0        8        0        2      345      271      346      346     1254     1255      346     1444
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-1
/com,*********** Elements for Body 2 "Disk" ***********
et,2,183
keyo,2,3,3
eblock,19,solid,,654
(19i9)
        2        2        2        2        0        0        0        0        8        0      552     1853     1854     2350     2350     2626     2629     2350     2627
        2        2        2        2        0        0        0        0        8        0      553     2248     2169     2249     2249     3402     3403     2249     3594
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-1
/com,*********** Send User Defined Coordinate System(s) ***********
csys,0
toffst,273.15,  ! Temperature offset from absolute zero
/com,*********** Set Reference Temperature ***********
tref,22.
/com,*********** Send Materials ***********
MP,DENS,1,1e-09,	! tonne mm^-3
MP,EX,1,0.01,	! tonne s^-2 mm^-1
MP,NUXY,1,0.4,

MP,DENS,2,1e-09,	! tonne mm^-3
MP,EX,2,0.01,	! tonne s^-2 mm^-1
MP,NUXY,2,0.4,

/com,*********** Send Sheet Properties ***********
r,1,10.

r,2,10.

!************************* Model Summary ********************
!Block,	Polymer,	matid,	1
!Disk,	Polymer,	matid,	2
!************************* End Model Summary ********************
/com,*********** Create Contact "Frictionless - Block To Disk" ***********
*set,tid,4
*set,cid,3
r,tid
r,cid
et,tid,169
et,cid,172
eblock,10,,,80
(15i9)
     1206        4        4        4        0       82       43      701
     1207        4        4        4        0       81       82      778
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-1
eblock,10,,,80
(15i9)
     1286        3        3        3        0       82       43      701
     1287        3        3        3        0       81       82      778
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-1
eblock,10,,,84
(15i9)
     1366        3        4        3        0     1785     1787     2488
     1367        3        4        3        0     1787     1788     2494
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-1
eblock,10,,,84
(15i9)
     1450        4        3        4        0     1785     1787     2488
     1451        4        3        4        0     1787     1788     2494
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-1
keyo,cid,8,2               ! auto create asymmetric contact (from Program Controlled setting)
keyo,cid,10,0              ! adjust contact stiffness each NR iteration
keyo,cid,12,0              ! standard contact
keyo,cid,2,0               ! augmented Lagrange (from Program Controlled setting)
keyo,cid,4,0               ! on Gauss point (from Program Controlled setting)
keyo,cid,9,0               ! use real geometry with stepped effects
keyo,cid,7,0               ! No Prediction
rmod,tid,3,1.       ! FKN
rmod,tid,5,0.       ! ICONT
rmod,tid,6,-0.55901700270495  ! PINB
rmod,tid,10,0.      ! CNOF
rmod,tid,12,0.      ! FKT
rmod,tid,36,28      ! WB DSID
rmod,cid,3,1.       ! FKN
rmod,cid,5,0.       ! ICONT
rmod,cid,6,-0.55901700270495  ! PINB
rmod,cid,10,0.      ! CNOF
rmod,cid,12,0.      ! FKT
rmod,cid,36,28      ! WB DSID
nsel,all
esel,all
CMBLOCK,_ICNAME ,NODE,     2059
(8i10)
      1785      1786      1787      1788      1789      1790      1791      1792
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cmsel,s,_ICNAME
/com,***************** Define Initial Velocity ***************
ic,all,UX,,-500.
ic,all,UY,,0.
nsel,all
fini
/com,****************************************************************************
/com,*************************    SOLUTION       ********************************
/com,****************************************************************************
/solu
antype,4                   ! transient analysis
nlgeom,on                  ! Turn on Large Deformation Effects
kbc,1                      ! stepped BC's
_thickRatio=  0     ! Ratio of thick parts in the model
eqsl,sparse,,,,,1
cntr,print,1               ! print out contact info and also make no initial contact an error
dmpoption,emat,no             ! Don't combine emat file for DANSYS
dmpoption,esav,no             ! Don't combine esav file for DANSYS
trnopt,full,,,,,hht        ! HHT time integration method
tintp, mosp			! Choose transient integration settings for moderate speed application
nldiag,cont,iter           ! print out contact info each equilibrium iteration
rescontrol,define,last,last,,dele	   ! Program Controlled
/com,****************************************************
/com,******************* SOLVE FOR LS 1 OF 1 ****************
autots,on                   ! User turned on automatic time stepping
deltim,0.0001,1e-05,0.001,OFF
time,0.2
timint,on                  ! Turn on time integration effects
outres,erase
outres,all,none
outres,nsol,-100,
outres,rsol,-100
outres,eangl,-100
outres,etmp,-100
outres,veng,-100
outres,cont,-100,
outres,v,-100,
outres,a,-100,
! *********** WB SOLVE COMMAND ***********
! check interactive state
*get,ANSINTER_,active,,int
*if,ANSINTER_,ne,0,then
/eof
*endif
solve
/com *************** Write FE CONNECTORS *********
CEWRITE,file,ce,,INTE
/com,****************************************************
/com,*************** FINISHED SOLVE FOR LS 1 *************
/post1
fini
