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/batch
! ANSYS input file written by Workbench version 2021 R1
! File used for geometry attach: C:\Users\ASUS\Documents\ANSYS\ANSYS2021\Sec13-2\Transjoint_files\dp0\SYS\DM\SYS.agdb
/title,Transjoint--Static Structural (A5)
/com,--- Data in consistent NMM units. See Solving Units in the help system for more information.
/units,MPA
/prep7
! Turn off shape checking because checks already performed inside WB mesher.
! See help system for more information.
SHPP,OFF,,NOWARN
etcon,set             ! allow ANSYS to choose best KEYOP's for 180x elements, resets any applicable keyopt to MAPDL defaults
/com,*********** Nodes for the whole assembly ***********
nblock,3,,437
(1i9,3e20.9e3)
        1    -3.000000000E+01     4.000000000E+01     0.000000000E+00
        2    -2.000000000E+01     4.000000000E+01     0.000000000E+00
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-1
/com,*********** Elements for Body 1 "Line Body" ***********
et,1,188
keyo,1,3,2
eblock,19,solid,,12
(19i9)
        1        1        1        1        0        0        0        0        3        0        1        1        3      191
        1        1        1        1        0        0        0        0        3        0        2        3        2      192
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-1
/com,*********** Elements for Body 2 "Line Body" ***********
et,2,188
keyo,2,3,2
eblock,19,solid,,8
(19i9)
        2        2        2        2        0        0        0        0        3        0       13       15       18      203
        2        2        2        2        0        0        0        0        3        0       14       18       17      204
        2        2        2        2        0        0        0        0        3        0       15       17       20      205
        2        2        2        2        0        0        0        0        3        0       16       20       19      206
        2        2        2        2        0        0        0        0        3        0       17       14       16      207
        2        2        2        2        0        0        0        0        3        0       18       16       15      208
        2        2        2        2        0        0        0        0        3        0       19       19       22      209
        2        2        2        2        0        0        0        0        3        0       20       22       21      210
-1
/com,*********** Elements for Body 3 "Line Body" ***********
et,3,188
keyo,3,3,2
eblock,19,solid,,8
(19i9)
        3        3        3        3        0        0        0        0        3        0       21       23       25      211
        3        3        3        3        0        0        0        0        3        0       22       25       24      212
        3        3        3        3        0        0        0        0        3        0       23       24       27      213
        3        3        3        3        0        0        0        0        3        0       24       27       26      214
        3        3        3        3        0        0        0        0        3        0       25       28       31      215
        3        3        3        3        0        0        0        0        3        0       26       31       30      216
        3        3        3        3        0        0        0        0        3        0       27       26       29      217
        3        3        3        3        0        0        0        0        3        0       28       29       28      218
-1
/com,*********** Elements for Body 4 "Line Body" ***********
et,4,188
keyo,4,3,2
eblock,19,solid,,12
(19i9)
        4        4        4        4        0        0        0        0        3        0       29       39       42      219
        4        4        4        4        0        0        0        0        3        0       30       42       41      220
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-1
/com,*********** Elements for Body 5 "Line Body" ***********
et,5,188
keyo,5,3,2
eblock,19,solid,,12
(19i9)
        5        5        5        5        0        0        0        0        3        0       41       45       47      231
        5        5        5        5        0        0        0        0        3        0       42       47       46      232
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-1
/com,*********** Elements for Body 6 "Line Body" ***********
et,6,188
keyo,6,3,2
eblock,19,solid,,12
(19i9)
        6        6        6        6        0        0        0        0        3        0       53       58       60      243
        6        6        6        6        0        0        0        0        3        0       54       60       59      244
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-1
/com,*********** Elements for Body 7 "Line Body" ***********
et,7,188
keyo,7,3,2
eblock,19,solid,,24
(19i9)
        7        7        7        7        0        0        0        0        3        0       65       17       71      255
        7        7        7        7        0        0        0        0        3        0       66       71       72      256
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-1
/com,*********** Elements for Body 8 "Line Body" ***********
et,8,188
keyo,8,3,2
eblock,19,solid,,24
(19i9)
        8        8        8        8        0        0        0        0        3        0       89       26       91      279
        8        8        8        8        0        0        0        0        3        0       90       91       92      280
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-1
/com,*********** Elements for Body 9 "Line Body" ***********
et,9,188
keyo,9,3,2
eblock,19,solid,,24
(19i9)
        9        9        9        9        0        0        0        0        3        0      113       24      111      303
        9        9        9        9        0        0        0        0        3        0      114      111      112      304
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-1
/com,*********** Elements for Body 10 "Line Body" ***********
et,10,188
keyo,10,3,2
eblock,19,solid,,24
(19i9)
       10       10       10       10        0        0        0        0        3        0      137       23      131      327
       10       10       10       10        0        0        0        0        3        0      138      131      132      328
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-1
/com,*********** Elements for Body 11 "Line Body" ***********
et,11,188
keyo,11,3,2
eblock,19,solid,,24
(19i9)
       11       11       11       11        0        0        0        0        3        0      161        4      161      351
       11       11       11       11        0        0        0        0        3        0      162      161      162      352
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-1
/com,*********** Elements for Body 12 "Line Body" ***********
et,12,188
keyo,12,3,2
eblock,19,solid,,24
(19i9)
       12       12       12       12        0        0        0        0        3        0      185        2      181      375
       12       12       12       12        0        0        0        0        3        0      186      181      182      376
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-1
/com,*********** Send User Defined Coordinate System(s) ***********
csys,0
toffst,273.15,  ! Temperature offset from absolute zero
/com,*********** Set Reference Temperature ***********
tref,22.
/com,*********** Send Materials ***********
MP,EX,1,2000,	! tonne s^-2 mm^-1
MP,NUXY,1,0.35,

MP,EX,2,2000,	! tonne s^-2 mm^-1
MP,NUXY,2,0.35,

MP,EX,3,2000,	! tonne s^-2 mm^-1
MP,NUXY,3,0.35,

MP,EX,4,2000,	! tonne s^-2 mm^-1
MP,NUXY,4,0.35,

MP,EX,5,2000,	! tonne s^-2 mm^-1
MP,NUXY,5,0.35,

MP,EX,6,2000,	! tonne s^-2 mm^-1
MP,NUXY,6,0.35,

MP,EX,7,2000,	! tonne s^-2 mm^-1
MP,NUXY,7,0.35,

MP,EX,8,2000,	! tonne s^-2 mm^-1
MP,NUXY,8,0.35,

MP,EX,9,2000,	! tonne s^-2 mm^-1
MP,NUXY,9,0.35,

MP,EX,10,2000,	! tonne s^-2 mm^-1
MP,NUXY,10,0.35,

MP,EX,11,2000,	! tonne s^-2 mm^-1
MP,NUXY,11,0.35,

MP,EX,12,2000,	! tonne s^-2 mm^-1
MP,NUXY,12,0.35,

/com,*********** Send Beam Properties ***********
SECTYPE,1,BEAM,RECT
SECDATA,10.,10.
secoffset,cent

SECTYPE,2,BEAM,RECT
SECDATA,10.,10.
secoffset,cent

SECTYPE,3,BEAM,RECT
SECDATA,10.,10.
secoffset,cent

SECTYPE,4,BEAM,RECT
SECDATA,10.,10.
secoffset,cent

SECTYPE,5,BEAM,RECT
SECDATA,10.,10.
secoffset,cent

SECTYPE,6,BEAM,RECT
SECDATA,10.,10.
secoffset,cent

SECTYPE,7,BEAM,RECT
SECDATA,1.,10.
secoffset,cent

SECTYPE,8,BEAM,RECT
SECDATA,1.,10.
secoffset,cent

SECTYPE,9,BEAM,RECT
SECDATA,1.,10.
secoffset,cent

SECTYPE,10,BEAM,RECT
SECDATA,1.,10.
secoffset,cent

SECTYPE,11,BEAM,RECT
SECDATA,1.,10.
secoffset,cent

SECTYPE,12,BEAM,RECT
SECDATA,1.,10.
secoffset,cent

!************************* Model Summary ********************
!Line Body,	POM,	matid,	1
!Line Body,	POM,	matid,	2
!Line Body,	POM,	matid,	3
!Line Body,	POM,	matid,	4
!Line Body,	POM,	matid,	5
!Line Body,	POM,	matid,	6
!Line Body,	POM,	matid,	7
!Line Body,	POM,	matid,	8
!Line Body,	POM,	matid,	9
!Line Body,	POM,	matid,	10
!Line Body,	POM,	matid,	11
!Line Body,	POM,	matid,	12
!************************* End Model Summary ********************
/com,*********** Fixed Supports ***********
CMBLOCK,_FIXEDSU,NODE,        1
(8i10)
        14
cmsel,s,_FIXEDSU
d,all,all
nsel,all
fini
/com,****************************************************************************
/com,*************************    SOLUTION       ********************************
/com,****************************************************************************
/solu
antype,0                   ! static analysis
nlgeom,on                  ! Turn on Large Deformation Effects
_thickRatio=  0     ! Ratio of thick parts in the model
eqsl,sparse,,,,,1
cntr,print,1               ! print out contact info and also make no initial contact an error
dmpoption,emat,no             ! Don't combine emat file for DANSYS
dmpoption,esav,no             ! Don't combine esav file for DANSYS
nldiag,cont,iter           ! print out contact info each equilibrium iteration
rescontrol,define,last,last,,dele	   ! Program Controlled
/com,****************************************************
/com,******************* SOLVE FOR LS 1 OF 1 ****************
/com,*** Set Displacements ***
CMBLOCK,_CM56UX_XP,NODE,        1
(8i10)
        30
cmsel,s,_CM56UX_XP
d,all,ux,40.
nsel,all

/com,*** Component For All Non-Zero UX Displacements ***
cmsel,s,_CM56ux_xp
cm,_DISPNONZEROUX,NODE
nsel,all

autots,off                 ! User turned off automatic time stepping
deltim,2.,2.,2.
time,40.
outres,erase
outres,all,none
outres,nsol,all,
outres,rsol,all
outres,eangl,all
outres,etmp,all
outres,veng,all
outres,strs,all,
outres,epel,all,
outres,eppl,all,
outres,cont,all,
esel,s,type,,1
esel,a,type,,2,12
cm,_elmisc,elem
esel,all
outres,misc,all,_elmisc
! *********** WB SOLVE COMMAND ***********
! check interactive state
*get,ANSINTER_,active,,int
*if,ANSINTER_,ne,0,then
/eof
*endif
solve
/com *************** Write FE CONNECTORS *********
CEWRITE,file,ce,,INTE
/com,****************************************************
/com,*************** FINISHED SOLVE FOR LS 1 *************
/post1
fini
