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/batch
! ANSYS input file written by Workbench version 2021 R1
! File used for geometry attach: C:\Users\ASUS\Documents\ANSYS\ANSYS2021\Sec13-3\Microgripper_files\dp0\Geom\DM\Geom.agdb
/title,Microgripper--Static Structural (A5)
/com,--- Data in consistent uMKS units. See Solving Units in the help system for more information.
/units,uMKS
/prep7
! Turn off shape checking because checks already performed inside WB mesher.
! See help system for more information.
SHPP,OFF,,NOWARN
ncnv,1,1e9             ! uMKS system, Increase DOF limit to 1e9
etcon,set             ! allow ANSYS to choose best KEYOP's for 180x elements, resets any applicable keyopt to MAPDL defaults
/com,*********** Nodes for the whole assembly ***********
nblock,3,,22228
(1i9,3e20.9e3)
    18601     1.498341817E+01     7.142451313E+02    -4.132373389E-01
    18602     1.498397097E+01     7.130314306E+02    -2.607115681E-01
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-1
/com,*********** Nodes for all Remote Points ***********
nblock,3
(1i9,3e20.9e3)
    20209     5.386091663E+00     7.136738041E+02     7.598789918E-17
-1
/com,*********** Elements for Body 1 "Gripper" ***********
et,1,187
eblock,19,solid,,10689
(19i9)
        1        1        1        1        0        0        0        0       10        0        1       25     1568     2942     2527     3126    11985     3130     3128
    11984    17601
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-1
/com,*********** Elements for Body 2 "Bead" ***********
/com,*********** Send Body as a Rigid Body ***********
et,2,21
keyo,2,2,1             ! Moments of inertia in nodal coordinates
keyo,2,3,0         ! 3D Mass With Rotary Intertia
r,2,2.77433800730563e-011,2.77433800730563e-011,2.77433800730563e-011,1.53546712480925e-009,7.40926344052813e-010,1.70145058187936e-009
local,11,0,5.62441647334049,713.673805392,-5.62435392794594,-3.41335268663674e-006,-8.76917623326807e-006,-44.9985238939864
nrot,20208
csys,0
mat,2
real,2
type,2
en,15258,20208
/com,*********** Send User Defined Coordinate System(s) ***********
local,12,0,0.,0.,0.,0.,90.,90.
local,13,0,0.,0.,0.,0.,0.,180.
csys,0
toffst,273.15,  ! Temperature offset from absolute zero
/com,*********** Set Reference Temperature ***********
tref,22.
/com,*********** Send Materials ***********
MP,EX,1,200,	! MPa
MP,NUXY,1,0.48,

Temperature = 'TEMP' ! Temperature
MP,DENS,2,7.85e-15,	! kg um^-3
MP,ALPX,2,1.2e-05,	! C^-1
MP,C,2,434000000000000,	! pJ kg^-1 C^-1
MP,KXX,2,60500000,	! pW um^-1 C^-1
MP,RSVX,2,1.7e-13,	! Tohm um
MP,EX,2,200000,	! MPa
MP,NUXY,2,0.3,
MP,MURX,2,10000,

!************************* Model Summary ********************
!Gripper,	Polymer,	matid,	1
!Bead,	Structural Steel,	matid,	2
!************************* End Model Summary ********************
/com,*********** Create Contact "Frictionless - Gripper To Bead" ***********
! ********* Create Contact to Connect To Rigid Body Mass Node ***********
*set,tid,3
*set,cid,3
et,tid,170
keyo,tid,2,1           ! Set MPC target element and not fix pilot
keyo,tid,4,0           ! Create CE's for all DOFs
type,tid
mat ,cid
real,cid
tshape,pilo
en,15260,20208
tshape
! ********* End of Create Contact to Connect To Rigid Body Mass Node ***********
! ******--- Create Insulation Layer on Rigid Body for Surface BC's ---********
eblock,10,,,512
(15i9)
    15261        3        3        3        0    19060    19078    19015    19006    20089    19977    19963    19964
    15262        3        3        3        0    19077    19060    19006    19005    20088    19964    19961    19962
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-1
! ******--- End Create Insulation Layer on Rigid Body for Surface BC's ---********
*set,tid,5
*set,cid,4
r,tid
r,cid
et,tid,170
et,cid,174
eblock,10,,,591
(15i9)
    15773        4        4        4        0     1409     1449     1422     1422    11177    11254     1422    11173
    15774        4        4        4        0     1408     1453     1428     1428    11167    11297     1428    11163
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-1
eblock,10,,,512
(15i9)
    16364        5        4        5        0    19060    19078    19015    19006    20089    19977    19963    19964
    16365        5        4        5        0    19077    19060    19006    19005    20088    19964    19961    19962
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-1
! ******--- Create Pilot Element For Rigid Targets ---********
mat,4
real,4
type,5
tshape,pilo
en,16876,20208
tshape
! ******--- End Create Pilot Element For Rigid Targets ---********
keyo,tid,2,1               ! Don't fix the pilot node since scoped to rigid body
keyo,cid,10,0              ! adjust contact stiffness each NR iteration (from Program Controlled setting)
keyo,cid,12,0              ! standard contact
keyo,cid,2,0               ! augmented Lagrange
keyo,cid,4,0               ! on Gauss point (from Program Controlled setting)
keyo,cid,9,0               ! use real geometry with stepped effects
keyo,cid,7,0               ! No Prediction
rmod,cid,3,1.       ! FKN
rmod,cid,5,0.       ! ICONT
rmod,cid,6,0.       ! PINB
rmod,cid,10,0.      ! CNOF
rmod,cid,12,0.      ! FKT
rmod,cid,36,30      ! WB DSID
mp,ex,cid,200.      ! EX of underlying rigid body
nsel,all
esel,all
/com,*********** Fixed Supports ***********
CMBLOCK,_FIXEDSU,NODE,      373
(8i10)
       437       463       464       465       466       467       468       469
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cmsel,s,_FIXEDSU
d,all,all
nsel,all
/com,********* Frictionless Supports X *********
CMBLOCK,_FRICSUX,NODE,      599
(8i10)
       217       218       219       220       221       222       223       224
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cmsel,s,_FRICSUX
d,all,ux,0
nsel,all
/com,********* Frictionless Supports Z *********
CMBLOCK,_FRICSUZ,NODE,     1401
(8i10)
         1         2        28        29        30        31        32        58
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cmsel,s,_FRICSUZ
d,all,uz,0
nsel,all
/com,*********** Create Remote Point "Internal Remote Point" ***********
! -------- Remote Point Used by "Remote Displacement" --------
*set,_npilot,20209
_npilot72=_npilot
mat,3
real,3
type,3
en,16877,20208,20209
/com,*********** Define Force Using Surface Effect Elements ***********
local,14,0,0.,0.,0.,0.,0.,0.
csys,0
et,6,156
keyop,6,5,1         !  No orientation node
eblock,10,,,10
(15i9)
    16878        6        6        6       14      241      240     4648
    16879        6        6        6       14      242      243     4661
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-1
esel,s,type,,6
keyop,6,2,1                ! Apply load in local coordinate system
keyop,6,7,1                ! Use original area so load is constant in large deformation
esel,all
/com,*********** Construct Remote Displacement ***********

/COM,*** Create a component for all remote displacements ***
CMBLOCK,REMOTEDISPALL,NODE,        1
(8i10)
     20209

fini
/com,****************************************************************************
/com,*************************    SOLUTION       ********************************
/com,****************************************************************************
/solu
antype,0                   ! static analysis
nlgeom,on                  ! Turn on Large Deformation Effects
_thickRatio=0.5     ! Ratio of thick parts in the model
eqsl,sparse,,,,,1
cntr,print,1               ! print out contact info and also make no initial contact an error
dmpoption,emat,no             ! Don't combine emat file for DANSYS
dmpoption,esav,no             ! Don't combine esav file for DANSYS
nldiag,cont,iter           ! print out contact info each equilibrium iteration
rescontrol,define,last,last,,dele	   ! Program Controlled
/com,****************************************************
/com,******************* SOLVE FOR LS 1 OF 1 ****************
esel,s,type,,6
nsle
sfe,all,1,pres,1,0.
sfe,all,2,pres,1,-6.66666666666667e-002
sfe,all,3,pres,1,0.
nsel,all
esel,all
d,20209,ux,0.
d,20209,uy,0.
d,20209,uz,0.
d,20209,rotx,0.
d,20209,roty,0.
d,20209,rotz,0.
autots,on                  ! Workbench Program Controlled automatic time stepping
nsub,1,10,1                ! due to presence of general nonlinear
time,1.
outres,erase
outres,all,none
outres,nsol,all,
outres,rsol,all
outres,eangl,all
outres,etmp,all
outres,veng,all
outres,strs,all,
outres,epel,all,
outres,eppl,all,
outres,cont,all,
esel,s,type,,2
cm,_elmisc,elem
esel,all
outres,misc,all,_elmisc
! *********** WB SOLVE COMMAND ***********
! check interactive state
*get,ANSINTER_,active,,int
*if,ANSINTER_,ne,0,then
/eof
*endif
solve
/com *************** Write FE CONNECTORS *********
CEWRITE,file,ce,,INTE
/com,****************************************************
/com,*************** FINISHED SOLVE FOR LS 1 *************
/post1
fini
