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/batch
! ANSYS input file written by Workbench version 2021 R1
! File used for geometry attach: C:\Users\ASUS\Documents\ANSYS\ANSYS2021\Sec13-4\Snap_files\dp0\SYS\DM\SYS.agdb
/title,Snap--Static Structural (A5)
/com,--- Data in consistent NMM units. See Solving Units in the help system for more information.
/units,MPA
/prep7
! Turn off shape checking because checks already performed inside WB mesher.
! See help system for more information.
SHPP,OFF,,NOWARN
etcon,set             ! allow ANSYS to choose best KEYOP's for 180x elements, resets any applicable keyopt to MAPDL defaults
/com,*********** Nodes for the whole assembly ***********
nblock,3,,4105
(1i9,3e20.9e3)
        1     1.300000000E+01     4.856000000E+01     0.000000000E+00
        2     1.000000000E+01     3.856000000E+01     0.000000000E+00
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-1
/com,*********** Elements for Body 1 "Prong" ***********
et,1,183
keyo,1,3,3
eblock,19,solid,,647
(19i9)
        1        1        1        1        0        0        0        0        8        0      516     2104     2245     2244     2244     3447     3644     2244     3446
        1        1        1        1        0        0        0        0        8        0      517     2349     2016     2320     2320     3227     3226     2320     3726
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-1
/com,*********** Elements for Body 2 "Insert" ***********
et,2,183
keyo,2,3,3
eblock,19,solid,,515
(19i9)
        2        2        2        2        0        0        0        0        8        0        1       55      511       54       54      683      681       54      680
        2        2        2        2        0        0        0        0        8        0        2      521      426      499      499     1533     1532      499     1619
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-1
/com,*********** Send User Defined Coordinate System(s) ***********
csys,0
toffst,273.15,  ! Temperature offset from absolute zero
/com,*********** Set Reference Temperature ***********
tref,22.
/com,*********** Send Materials ***********
MP,EX,1,2800,	! tonne s^-2 mm^-1
MP,NUXY,1,0.35,

MP,EX,2,2800,	! tonne s^-2 mm^-1
MP,NUXY,2,0.35,

/com,*********** Send Sheet Properties ***********
r,1,5.

r,2,5.

!************************* Model Summary ********************
!Prong,	Plastic,	matid,	1
!Insert,	Plastic,	matid,	2
!************************* End Model Summary ********************
/com,*********** Create Contact "Frictional - Prong To Insert" ***********
*set,tid,4
*set,cid,3
r,tid
r,cid
et,tid,169
et,cid,172
eblock,10,,,84
(15i9)
     1163        4        4        4        0     1733     1721     2493
     1164        4        4        4        0     1732     1733     2516
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-1
eblock,10,,,84
(15i9)
     1247        3        3        3        0     1733     1721     2493
     1248        3        3        3        0     1732     1733     2516
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-1
eblock,10,,,68
(15i9)
     1331        3        4        3        0      105        2      579
     1332        3        4        3        0      106      105      781
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-1
eblock,10,,,68
(15i9)
     1399        4        3        4        0      105        2      579
     1400        4        3        4        0      106      105      781
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-1
keyo,cid,8,2               ! auto create asymmetric contact (from Program Controlled setting)
keyo,cid,10,0              ! adjust contact stiffness each NR iteration (from Program Controlled setting)
keyo,cid,12,0              ! standard contact
mp,mu,cid,0.1       ! unitless
keyo,cid,2,0               ! augmented Lagrange (from Program Controlled setting)
keyo,cid,4,0               ! on Gauss point (from Program Controlled setting)
keyo,cid,9,0               ! use real geometry with stepped effects
keyo,cid,7,0               ! No Prediction
rmod,tid,3,1.       ! FKN
rmod,tid,5,0.       ! ICONT
rmod,tid,6,1.       ! PINB
rmod,tid,10,0.      ! CNOF
rmod,tid,12,0.      ! FKT
rmod,tid,36,28      ! WB DSID
rmod,cid,3,1.       ! FKN
rmod,cid,5,0.       ! ICONT
rmod,cid,6,1.       ! PINB
rmod,cid,10,0.      ! CNOF
rmod,cid,12,0.      ! FKT
rmod,cid,36,28      ! WB DSID
nsel,all
esel,all
/com,*********** Fixed Supports ***********
CMBLOCK,_FIXEDSU,NODE,       19
(8i10)
      1681      1684      1685      1686      1687      1688      1689      1690
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cmsel,s,_FIXEDSU
d,all,all
nsel,all
/com,********* Frictionless Supports X *********
CMBLOCK,_FRICSUX,NODE,       13
(8i10)
        20        29        30        31       614       630       632      1675
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cmsel,s,_FRICSUX
d,all,ux,0
nsel,all
/com,*********** Create Displacement Tables and Functions ******

*DIM,_loadvari42yp,TABLE,3,1,1,TIME,
! Time values
_loadvari42yp(1,0,1) = 0.
_loadvari42yp(2,0,1) = 1.
_loadvari42yp(3,0,1) = 2.
! Load values
_loadvari42yp(1,1,1) = 0.
_loadvari42yp(2,1,1) = -18.56
_loadvari42yp(3,1,1) = 0.


*DIM,_loadvari42yn,TABLE,3,1,1,TIME,
! Time values
_loadvari42yn(1,0,1) = 0.
_loadvari42yn(2,0,1) = 1.
_loadvari42yn(3,0,1) = 2.
! Load values
_loadvari42yn(1,1,1) = 0.
_loadvari42yn(2,1,1) = 18.56
_loadvari42yn(3,1,1) = 0.

fini
/com,****************************************************************************
/com,*************************    SOLUTION       ********************************
/com,****************************************************************************
/solu
antype,0                   ! static analysis
nlgeom,on                  ! Turn on Large Deformation Effects
_thickRatio=  0     ! Ratio of thick parts in the model
eqsl,sparse,,,,,1
cntr,print,1               ! print out contact info and also make no initial contact an error
dmpoption,emat,no             ! Don't combine emat file for DANSYS
dmpoption,esav,no             ! Don't combine esav file for DANSYS
nldiag,cont,iter           ! print out contact info each equilibrium iteration
rescontrol,define,last,last,,dele	   ! Program Controlled
/com,****************************************************
/com,******************* SOLVE FOR LS 1 OF 2 ****************
/com,*** Set Displacements ***
CMBLOCK,_CM42UY_YP,NODE,       19
(8i10)
        17        20        21        22        23        24        25        26
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cmsel,s,_CM42UY_YP
d,all,uy,%_loadvari42yp%
nsel,all

/com,*** Component For All Non-Zero UY Displacements ***
cmsel,s,_CM42uy_yp
cm,_DISPNONZEROUY,NODE
nsel,all

autots,on                   ! User turned on automatic time stepping
deltim,0.02,0.002,0.02,OFF
time,1.
outres,erase
outres,all,none
outres,nsol,all,
outres,rsol,all
outres,eangl,all
outres,etmp,all
outres,veng,all
outres,strs,all,
outres,epel,all,
outres,eppl,all,
outres,cont,all,
! *********** WB SOLVE COMMAND ***********
! check interactive state
*get,ANSINTER_,active,,int
*if,ANSINTER_,ne,0,then
/eof
*endif
solve
/com *************** Write FE CONNECTORS *********
CEWRITE,file,ce,,INTE
/com,****************************************************
/com,*************** FINISHED SOLVE FOR LS 1 *************
/com,****************************************************
/com,******************* SOLVE FOR LS 2 OF 2 ****************
/com,*** Set Displacements ***
autots,on                   ! User turned on automatic time stepping
deltim,0.002,0.002,0.02,ON
time,2.
outres,erase
outres,all,none
outres,nsol,all,
outres,rsol,all
outres,eangl,all
outres,etmp,all
outres,veng,all
outres,strs,all,
outres,epel,all,
outres,eppl,all,
outres,cont,all,
solve
/com,****************************************************
/com,*************** FINISHED SOLVE FOR LS 2 *************
/post1
fini
