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/batch
! ANSYS input file written by Workbench version 2021 R1
! File used for geometry attach: C:\Users\ASUS\Documents\ANSYS\ANSYS2021\Sec14-3\Seal_files\dp0\SYS\DM\SYS.agdb
/title,Seal--Static Structural (A5)
/com,--- Data in consistent BIN units. See Solving Units in the help system for more information.
/units,BIN
/prep7
! Turn off shape checking because checks already performed inside WB mesher.
! See help system for more information.
SHPP,OFF,,NOWARN
etcon,set             ! allow ANSYS to choose best KEYOP's for 180x elements, resets any applicable keyopt to MAPDL defaults
/com,*********** Nodes for the whole assembly ***********
nblock,3,,7387
(1i9,3e20.9e3)
        1     2.133487641E-01     1.330000000E-01     0.000000000E+00
        2     5.000000000E-02     1.330000000E-01     0.000000000E+00
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-1
/com,*********** Elements for Body 1 "Rubber" ***********
et,1,183
keyo,1,3,2
eblock,19,solid,,463
(19i9)
        1        1        1        1        0        0        0        0        8        0        1      191      529      263      263      959     1167      263      956
        1        1        1        1        0        0        0        0        8        0        2      268      267      180      180     1175      919      180      920
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-1
/com,*********** Elements for Body 2 "Upper Plate" ***********
et,2,183
keyo,2,3,2
eblock,19,solid,,800
(19i9)
        2        2        2        2        0        0        0        0        8        0     1264     4421     4945     5026     4316     5695     6683     5386     5385
        2        2        2        2        0        0        0        0        8        0     1265     4316     4366     4484     4421     5383     5555     5693     5385
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-1
/com,*********** Elements for Body 3 "Lower Plate" ***********
et,3,183
keyo,3,3,2
eblock,19,solid,,800
(19i9)
        3        3        3        3        0        0        0        0        8        0      464     1773     1812     1811     1735     2925     3036     2805     2803
        3        3        3        3        0        0        0        0        8        0      465     1735     1792     1895     1773     2804     2989     2926     2803
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-1
/com,*********** Send User Defined Coordinate System(s) ***********
csys,0
toffst,459.67,  ! Temperature offset from absolute zero
/com,*********** Set Reference Temperature ***********
tref,71.6
/com,*********** Send Materials ***********

TB,HYPE,1,1,2,MOON
TBTEMP,70.0000000000001
TBDATA,1,103.174841854963,-4.8079369119799,0

Temperature = 'TEMP' ! Temperature
MP,DENS,2,0.000734544492879577,	! slinch in^-3
MP,ALPX,2,6.66666666666667e-06,	! F^-1
MP,C,2,373722.969668162,	! in^2 s^-2 F^-1
MP,KXX,2,7.55607836445752,	! slinch in s^-3 F^-1
MP,RSVX,2,8.52348993288591,	! ohm cmil in^-1
MP,EX,2,29007547.5428236,	! slinch s^-2 in^-1
MP,NUXY,2,0.3,
MP,MURX,2,10000,

Temperature = 'TEMP' ! Temperature
MP,DENS,3,0.000734544492879577,	! slinch in^-3
MP,ALPX,3,6.66666666666667e-06,	! F^-1
MP,C,3,373722.969668162,	! in^2 s^-2 F^-1
MP,KXX,3,7.55607836445752,	! slinch in s^-3 F^-1
MP,RSVX,3,8.52348993288591,	! ohm cmil in^-1
MP,EX,3,29007547.5428236,	! slinch s^-2 in^-1
MP,NUXY,3,0.3,
MP,MURX,3,10000,

/com,*********** Send Sheet Properties ***********
!************************* Model Summary ********************
!Rubber,	Rubber,	matid,	1
!Upper Plate,	Structural Steel,	matid,	2
!Lower Plate,	Structural Steel,	matid,	3
!************************* End Model Summary ********************
/com,*********** Create Contact "Frictionless - Rubber To Upper Plate" ***********
*set,tid,5
*set,cid,4
r,tid
r,cid
et,tid,169
et,cid,172
eblock,10,,,82
(15i9)
     2064        4        4        4        0      111      103      750
     2065        4        4        4        0      110      111      765
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-1
eblock,10,,,80
(15i9)
     2146        5        4        5        0     4237     4137     5030
     2147        5        4        5        0     4238     4237     5226
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-1
keyo,cid,10,0              ! adjust contact stiffness each NR iteration (from Program Controlled setting)
keyo,cid,12,0              ! standard contact
keyo,cid,2,0               ! augmented Lagrange (from Program Controlled setting)
keyo,cid,4,0               ! on Gauss point (from Program Controlled setting)
keyo,cid,9,0               ! use real geometry with stepped effects
keyo,cid,7,0               ! No Prediction
rmod,cid,3,1.       ! FKN
rmod,cid,5,0.       ! ICONT
rmod,cid,6,1.       ! PINB
rmod,cid,10,0.      ! CNOF
rmod,cid,12,0.      ! FKT
rmod,cid,36,31      ! WB DSID
/com,*********** Create Contact "Frictionless - Rubber To Lower Plate" ***********
*set,tid,7
*set,cid,6
r,tid
r,cid
et,tid,169
et,cid,172
eblock,10,,,80
(15i9)
     2226        6        6        6        0       94       95      734
     2227        6        6        6        0       93       94      732
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-1
eblock,10,,,80
(15i9)
     2306        7        6        7        0     1656     1556     2449
     2307        7        6        7        0     1657     1656     2645
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-1
keyo,cid,10,0              ! adjust contact stiffness each NR iteration (from Program Controlled setting)
keyo,cid,12,0              ! standard contact
keyo,cid,2,0               ! augmented Lagrange (from Program Controlled setting)
keyo,cid,4,0               ! on Gauss point (from Program Controlled setting)
keyo,cid,9,0               ! use real geometry with stepped effects
keyo,cid,7,0               ! No Prediction
rmod,cid,3,1.       ! FKN
rmod,cid,5,0.       ! ICONT
rmod,cid,6,1.       ! PINB
rmod,cid,10,0.      ! CNOF
rmod,cid,12,0.      ! FKT
rmod,cid,36,34      ! WB DSID
nsel,all
esel,all
/com,*********** Fixed Supports ***********
CMBLOCK,_FIXEDSU,NODE,      161
(8i10)
      1555      1566      1567      1568      1569      1570      1571      1572
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cmsel,s,_FIXEDSU
d,all,all
nsel,all
/com,********* Frictionless Supports X *********
CMBLOCK,_FRICSUX,NODE,       56
(8i10)
        87        96        97        98        99       100       101       102
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
cmsel,s,_FRICSUX
d,all,ux,0
nsel,all
fini
/com,****************************************************************************
/com,*************************    SOLUTION       ********************************
/com,****************************************************************************
/solu
antype,0                   ! static analysis
nlgeom,on                  ! Turn on Large Deformation Effects
_thickRatio=  0     ! Ratio of thick parts in the model
eqsl,sparse,,,,,1
cntr,print,1               ! print out contact info and also make no initial contact an error
dmpoption,emat,no             ! Don't combine emat file for DANSYS
dmpoption,esav,no             ! Don't combine esav file for DANSYS
nldiag,cont,iter           ! print out contact info each equilibrium iteration
rescontrol,define,last,last,,dele	   ! Program Controlled
/com,****************************************************
/com,******************* SOLVE FOR LS 1 OF 1 ****************
/com,*** Set Displacements ***
CMBLOCK,_CM45UY_YP,NODE,      161
(8i10)
      4136      4147      4148      4149      4150      4151      4152      4153
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cmsel,s,_CM45UY_YP
d,all,uy,-0.85
nsel,all

/com,*** Component For All Non-Zero UY Displacements ***
cmsel,s,_CM45uy_yp
cm,_DISPNONZEROUY,NODE
nsel,all

autots,on                  ! Workbench Program Controlled automatic time stepping
nsub,5,1000,1              ! due to presence of nonlinear materials
time,1.
outres,erase
outres,all,none
outres,nsol,all,
outres,rsol,all
outres,eangl,all
outres,etmp,all
outres,veng,all
outres,strs,all,
outres,epel,all,
outres,eppl,all,
outres,cont,all,
! *********** WB SOLVE COMMAND ***********
! check interactive state
*get,ANSINTER_,active,,int
*if,ANSINTER_,ne,0,then
/eof
*endif
solve
/com *************** Write FE CONNECTORS *********
CEWRITE,file,ce,,INTE
/com,****************************************************
/com,*************** FINISHED SOLVE FOR LS 1 *************
/post1
fini
